fF := 10^-15*F
fC := 10^-15*C
# Process parameters for the AMS C35 Process (5V option)
# Typical sheet resistance for RPOLYH resistor
R_PH := 1200 Ω
# Thermal coefficient for RPOLY2 resistor
α_HY := -0.75*10^-3
# Typical sheet resistance for RPOLY2 resistor
R_P2 := 50 Ω
# Thermal coefficient for RPOLY2 resistor
α_P2 := 0.59*10^-3
# Area capacitance for double poly capacitors fF/um^2
C_a_pp := 860*fF/μm^2
# Thermal coefficient for double poly caps
α_pp := 30*10^-6
# Threshold voltages
V_TN := 0.70 V
V_TP := -1.0 V
# Subthreshold slope factor
n := 1.5
# Supply voltage
V_DD := 5 V
# Transconductance parameter
K_PN := 100*μA/V^2
K_PP := 30*μA/V^2
Ρ := K_PN/K_PP = 3.33333
Permitivity
ε_o := 8.854*10^-14*F/cm
ε_SiO2 := 3.9*ε_o = 3.45306e-13 F/cm
ε_Si := 11.7*ε_o = 1.03592e-12 F/cm
t_ox := 15 nm
# Oxide capacitance per unit area
C_ox := ε_SiO2/t_ox = 2.30204 fF/μm^2
# Substrate doping levels
N_A := 173*10^15*cm^-3  # P-SUBSTRATE
N_D := 63*10^15*cm^-3  # NWELL
# Intrinsic concentration
n_i := 1.05*10^10*cm^-3
# Thermal voltage:
U_T := 25.9 mV
# Electronic charge:
q_e := 1.602*10^-19*C
# Flicker noise parameters (current noise)
K_aP := 3.8*10^-30*A*F
K_aN := 6.3*10^-26*A*F
# Flicker noise current density
i_n2 := K_a*I_B/(C_OX*L^2)*df/f  # error: This variable is undefined.
v_n2 := i_n2/g_m^2 → I_B*K_a*df/(C_OX*L^2*f*g_m^2)  # error: This variable is undefined.
# If the device is strongly inverted then we can write
v_n2 := v_n2 substitute, g_m == sqrt(2*I_B*S*K_P/n_sub) → K_a*df*n_sub/(2*C_OX*K_P*L^2*S*f)  # error: This variable is undefined.
v_n2 := v_n2 substitute, S == W/L → K_a*df*n_sub/(2*C_OX*K_P*L*W*f)  # error: This variable is undefined.
v_n2 := v_n2 substitute, K_a*n_sub/(2*K_P) == K_v → K_v*df/(C_OX*L*W*f)  # error: This variable is undefined.
# So let us compute
K_vP := K_aP*n/(2*K_PP) = 9.5e-26 J
K_vN := K_aN*n/(2*K_PN) = 4.725e-22 J
# IMPORTANT FUNCTIONS
# Functions to compute inversion coefficient.
θN(I, S) := I/(2*n*S*K_PN*U_T^2)
θP(I, S) := I/(2*n*S*K_PP*U_T^2)
# Equation used to compute saturation voltage.
VSAT(θ) := 2*n*U_T*sqrt(θ)/(1 - e^(-sqrt(θ)))
# Equation used to compute shape factor given θ and I.
SN(I, θ) := I/(2*n*θ*K_PN*U_T^2)
SP(I, θ) := I/(2*n*θ*K_PP*U_T^2)
# Compute output resistance
K_dsn := sqrt(2*ε_Si/(q_e*N_A)) = 0.0864616 μm/sqrt(V)
K_dsp := sqrt(2*ε_Si/(q_e*N_D)) = 0.143277 μm/sqrt(V)
# Assume
ϕ_o := 0.8 V
VEN(L) := 2*L*sqrt(ϕ_o)/K_dsn
VEP(L) := 2*L*sqrt(ϕ_o)/K_dsp
# Equations used to compute transconductance.
GM(I, θ) :=
    out ← (1 - e^(-sqrt(θ)))/sqrt(θ)*I/(n*U_T)
    return out
# Functions to compute gate capacitance
CGN(I, θ, L) :=
    out ← C_ox*I*L^2/(2*n*θ*K_PN*U_T^2)
    return out
CGP(I, θ, L) :=
    out ← C_ox*I*L^2/(2*n*θ*K_PP*U_T^2)
    return out
# Functions to compute gate-drain capacitance
CGDN(W) :=
    out ← W*0.1*fF/μm
    return out
CGDP(W) :=
    out ← W*0.1*fF/μm
    return out
# Functions used to compute the DB and SB capacitance
LDIFF := 1.2 μm
CXBN(W) :=
    out ← W*LDIFF*0.416*fF/μm^2 + 2*(W + LDIFF)*0.345*fF/μm
    return out
CXBP(W) :=
    out ← W*LDIFF*0.710*fF/μm^2 + 2*(W + LDIFF)*0.236*fF/μm
    return out
# Function used to compute the gate-source capacitance
CGS(W, L) :=
    out ← 2/3*W*L*C_ox
    return out
# Equations used to compute noise spectral density
# First the thermal density
SVT(I, θ) :=
    (γ ← 1/(1 + θ)*(1/2 + 2/3*θ))
    out ← 4*U_T*q_e*n*γ/GM(I, θ)
    return out
# Now the flicker noise densities.
SVFP(I, θ, L) :=
    α ← (1 - e^(-sqrt(θ)))/sqrt(θ)
    out ← n^2*U_T^2*K_aP/(α^2*I*C_ox*L^2)
    return out
SVFN(I, θ, L) :=
    α ← (1 - e^(-sqrt(θ)))/sqrt(θ)
    out ← n^2*U_T^2*K_aN/(α^2*I*C_ox*L^2)
    return out
θ := 0.1, 1.1 .. 100
L_n := 1 μm, 2 μm .. 20 μm
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θ == I/(2*n*S*K_p*U_T^2)
# Plot saturation voltage as function of inversion coefficient.
θ := 0.1, 0.2 .. 1000
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# Plot gm/I as function of inversion coefficient.
gm_over_i_ratio(θ) := 1/(n*U_T)*(1 - e^(-sqrt(θ)))/sqrt(θ)
α == (1 - e^(-sqrt(θ)))/sqrt(θ)
g_m == α*I/(n*U_T)
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α(θ) := (1 - e^(-sqrt(θ)))/sqrt(θ)
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# For the global substrate
C_ox := 2.3*fF/μm^2
ε_si := 11.7*8.854*10^-14*F/cm
q_e := 1.602*10^-19*C
γ_n := 1.05*V^(1/2)
N_A := C_ox^2*γ_n^2/(2*q_e*ε_si) = 1.75718e17 cm^-3
# For the NWELL
γ_p := 0.63*V^(1/2)
N_D := C_ox^2*γ_p^2/(2*q_e*ε_si) = 6.32585e16 cm^-3
# We need to compute the Fermi potentials
ϕ_FN := U_T*ln(N_A/n_i) = 0.430795 V
ϕ_FP := -U_T*ln(N_D/n_i) = -0.404334 V
# For NFETs the subthreshold slope factor is
n_n(V_SB) := 1 + γ_n/(2*sqrt(2*|ϕ_FN| + V_SB))
V_SB := 0 V, 0.25 V .. 5 V
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# For PFETs the subthreshold slope factor is
n_p(V_BS) := 1 + γ_p/(2*sqrt(2*|ϕ_FP| + V_BS))
V_BS := 0 V, 0.25 V .. 5 V
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# Let us plot the threshold voltage for a NFET as function of Vsb.
V_TN0 := 0.7 V
V_SB := 0, 0.25 V .. 5 V
V_TN(V_SB) := V_TN0 + γ_n*(sqrt(2*|ϕ_FN| + V_SB) - sqrt(2*|ϕ_FN|))
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# Let us plot the threshold voltage for a PFET as function of Vbs.
V_TP0 := -1 V
V_TP(V_BS) := V_TP0 - γ_p*(sqrt(2*|ϕ_FP| + V_BS) - sqrt(2*|ϕ_FP|))
V_BS := 0 V, 0.25 V .. 5 V
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# Now let's try to compute channel length modulation factors,
# Now let's look at channel length modulation effects.
K_dsn := sqrt(2*ε_si/(q_e*N_A)) = 0.0857903 μm/sqrt(V)
K_dsp := sqrt(2*ε_si/(q_e*N_D)) = 0.142984 μm/sqrt(V)
# Lookup built-in potential
ϕ_oN := 0.84 V
ϕ_oP := 0.87 V
# Channel length modulation factor.
λ == K_dsn/(2*L*sqrt(V_DS - V_eff + ϕ_o))
# Worst case is when Vds is Veff.  Also, let's compute for L = 1 um.
λ_N(L_n) := K_dsn/(2*L_n*sqrt(ϕ_oN))
λ_P(L_p) := K_dsp/(2*L_p*sqrt(ϕ_oP))
λ_N(1 μm) = 0.0468025 1/V
λ_P(1 μm) = 0.0766474 1/V
V_EN := 1/λ_N(1 μm) = 21.3664 V
V_EP := 1/λ_P(1 μm) = 13.0468 V
