fF := 10^-15*F
fC := 10^-15*C
# Process parameters for the AMS C35 Process (3V option)
R_PH := 1200 Ω  # Typical sheet resistance for RPOLYH resistor
α_HY := -0.75*10^-3  # Thermal coefficient for RPOLY2 resistor
R_P2 := 50 Ω  # Typical sheet resistance for RPOLY2 resistor
α_P2 := 0.59*10^-3  # Thermal coefficient for RPOLY2 resistor
C_pp := 860*fF/μm^2  # Area capacitance for double poly capacitors fF/um^2
α_pp := 30*10^-6  # Thermal coefficient for double poly caps
V_TN0 := 0.5 V  # Threshold voltages fo NMOS
V_TP0 := -0.7 V  # Threshold voltage for PMOS
n_n := 1.3  # Subthreshold slope factor for NMOS
n_p := 1.2  # Subthreshold slope factor for PMOS
V_DD := 3.3 V  # Supply voltage
# Transconductance parameter
K_PN := 170*μA/V^2
K_PP := 60*μA/V^2
Ρ := K_PN/K_PP = 2.83333
# Matching parameters:
A_KPN := 0.007*μm
A_VTN := 9.4 mV*μm
A_KVP := 0.01*μm
A_VTP := 14.5 mV*μm
Permitivity
ε_o := 8.854*10^-14*F/cm
ε_SiO2 := 3.9*ε_o = 3.45306e-13 F/cm
t_ox := 7.6 nm
ε_Si := 11.7*ε_o = 1.03592e-12 F/cm
C_ox := ε_SiO2/t_ox = 4.5435 fF/μm^2  # Oxide capacitance per unit area
# Substrate doping levels
N_A := 212*10^15*cm^-3  # P-SUBSTRATE
N_D := 101*10^15*cm^-3  # NWELL
# Intrinsic concentration
n_i := 1.05*10^10*cm^-3
# Thermal voltage:
U_T := 25.9 mV
# Electronic charge:
q_e := 1.602*10^-19*C
# IMPORTANT FUNCTIONS
# Functions to compute inversion coefficient.
θN(I, S) := I/(2*n_n*S*K_PN*U_T^2)
θP(I, S) := I/(2*n_p*S*K_PP*U_T^2)
# Equation used to compute saturation voltage.
VSATP(θ) := 2*n_p*U_T*sqrt(θ)/(1 - e^(-sqrt(θ)))
VSATN(θ) := 2*n_n*U_T*sqrt(θ)/(1 - e^(-sqrt(θ)))
# Equation used to compute shape factor given θ and I.
SN(I, θ) := I/(2*n_n*θ*K_PN*U_T^2)
SP(I, θ) := I/(2*n_p*θ*K_PP*U_T^2)
# Compute output resistance
K_dsn := sqrt(2*ε_Si/(q_e*N_A)) = 0.0781049 μm/sqrt(V)
K_dsp := sqrt(2*ε_Si/(q_e*N_D)) = 0.113158 μm/sqrt(V)
ϕ_o := 0.8 V
PB_n := 0.69 V
PB_p := 1.02 V
VEN(L) := 2*L*sqrt(PB_n)/K_dsn
VEP(L) := 2*L*sqrt(PB_p)/K_dsp
# Equations used to compute transconductance.
GMN(I, θ) :=
    out ← (1 - e^(-sqrt(θ)))/sqrt(θ)*I/(n_n*U_T)
    return out
GMP(I, θ) :=
    out ← (1 - e^(-sqrt(θ)))/sqrt(θ)*I/(n_p*U_T)
    return out
# Functions to compute gate capacitance
CGN(I, θ, L) :=
    out ← C_ox*I*L^2/(2*n_n*θ*K_PN*U_T^2)
    return out
CGP(I, θ, L) :=
    out ← C_ox*I*L^2/(2*n_p*θ*K_PP*U_T^2)
    return out
# Functions to compute gate-drain capacitance
CGDN(W) :=
    out ← W*0.1*fF/μm
    return out
CGDP(W) :=
    out ← W*0.1*fF/μm
    return out
# Functions used to compute the DB and SB capacitance
LDIFF := 0.7 μm
CXBN(W) :=
    out ← W*LDIFF*0.84*fF/μm^2 + 2*(W + LDIFF)*0.25*fF/μm
    return out
CXBP(W) :=
    out ← W*LDIFF*1.36*fF/μm^2 + 2*(W + LDIFF)*0.35*fF/μm
    return out
# Function used to compute the gate-source capacitance
CGS(W, L) :=
    out ← 2/3*W*L*C_ox
    return out
# Equations used to compute noise spectral density
# First the thermal density
SVTN(I, θ) :=
    (γ ← 1/(1 + θ)*(1/2 + 2/3*θ))
    out ← 4*U_T*q_e*n_n*γ/GMN(I, θ)
    return out
SVTP(I, θ) :=
    (γ ← 1/(1 + θ)*(1/2 + 2/3*θ))
    out ← 4*U_T*q_e*n_p*γ/GMP(I, θ)
    return out
# Now the flicker noise densities.
SVFP(I, θ, L) :=
    α ← (1 - e^(-sqrt(θ)))/sqrt(θ)
    out ← n_p^2*U_T^2*K_aP/(α^2*I*C_ox*L^2)
    return out  # error: This variable is undefined.
SVFN(I, θ, L) :=
    α ← (1 - e^(-sqrt(θ)))/sqrt(θ)
    out ← n_n^2*U_T^2*K_aN/(α^2*I*C_ox*L^2)
    return out  # error: This variable is undefined.
# Trying to size transistors for DAC used to set threshold.
# Look at the R transistor.
V_G := 1 V
W_1 := 10 μm
L_1 := 10 μm
A_1 := W_1*L_1 = 100 μm^2
I_B := 12 μA
S_1 := W_1/L_1
θ_1 := θP(I_B, S_1) = 124.228
V_EFF1 := VSATP(θ_1) = 0.69283 V
V_SG1 := |V_TP0| + V_EFF1 = 1.39283 V
V_S1 := V_G + V_SG1 = 2.39283 V
R_1 := 1/(S_1*K_PP*V_EFF1) = 24.0559 kΩ
V_DS1 := I_B*R_1 = 0.288671 V
# Lets look at the diode connected NFET in the current mirror
W_2 := 10 μm
L_2 := 20 μm
S_2 := W_2/L_2 = 0.5
A_2 := W_2*L_2 = 200 μm^2
I_2 := I_B/2 = 6 μA
θ_2 := θN(I_2, S_2) = 40.4724
V_EFF2 := VSATN(θ_2) = 0.429144 V
V_GS2 := V_TN0 + V_EFF2 = 0.929144 V
r_ds2 := VEN(L_2)/I_2 = 70.9014 MΩ
rel_err_in_i := 2/VEN(L_2) = 0.00470136 1/V
# Look at the PFET current mirror.
W_3 := 10 μm
L_3 := 20 μm
S_3 := W_3/L_3 = 0.5
A_3 := W_3*L_3 = 200 μm^2
I_3 := I_2 = 6 μA
θ_3 := θP(I_3, S_3) = 124.228
V_EFF3 := VSATP(θ_3) = 0.69283 V
V_SG2 := |V_TP0| + V_EFF3 = 1.39283 V
rel_err_in_i := 2/VEP(L_3) = 0.00560216 1/V
