fF := 10^-15*F
fC := 10^-15*C
# Process parameters for the AMS C35 Process (3V option)
R_PH := 1200 Ω  # Typical sheet resistance for RPOLYH resistor
α_PH := -0.75*10^-3  # Thermal coefficient for RPOLYH resistor
R_P2 := 50 Ω  # Typical sheet resistance for RPOLY2 resistor
α_P2 := 0.59*10^-3  # Thermal coefficient for RPOLY2 resistor
C_pp := 860*fF/μm^2  # Area capacitance for double poly capacitors fF/um^2
α_pp := 30*10^-6  # Thermal coefficient for double poly caps
V_TN0 := 0.5 V  # Threshold voltages fo NMOS
V_TP0 := -0.7 V  # Threshold voltage for PMOS
n_n := 1.3  # Subthreshold slope factor for NMOS
n_p := 1.2  # Subthreshold slope factor for PMOS
V_DD := 3.3 V  # Supply voltage
# Transconductance parameter
K_PN := 170*μA/V^2
K_PP := 60*μA/V^2
Ρ := K_PN/K_PP = 2.83333
# Matching parameters:
A_KPN := 0.007*μm
A_VTN := 9.4 mV*μm
A_KVP := 0.01*μm
A_VTP := 14.5 mV*μm
Permitivity
ε_o := 8.854*10^-14*F/cm
ε_SiO2 := 3.9*ε_o = 3.45306e-13 F/cm
t_ox := 7.6 nm
ε_Si := 11.7*ε_o = 1.03592e-12 F/cm
C_ox := ε_SiO2/t_ox = 4.5435 fF/μm^2  # Oxide capacitance per unit area
# Substrate doping levels
N_A := 212*10^15*cm^-3  # P-SUBSTRATE
N_D := 101*10^15*cm^-3  # NWELL
# Intrinsic concentration
n_i := 1.05*10^10*cm^-3
# Thermal voltage:
U_T := 25.9 mV
# Electronic charge:
q_e := 1.602*10^-19*C
# IMPORTANT FUNCTIONS
# Functions to compute inversion coefficient.
θN(I, S) := I/(2*n_n*S*K_PN*U_T^2)
θP(I, S) := I/(2*n_p*S*K_PP*U_T^2)
# Equation used to compute saturation voltage.
VSATP(θ) := 2*n_p*U_T*sqrt(θ)/(1 - e^(-sqrt(θ)))
VSATN(θ) := 2*n_n*U_T*sqrt(θ)/(1 - e^(-sqrt(θ)))
# Equation used to compute shape factor given θ and I.
SN(I, θ) := I/(2*n_n*θ*K_PN*U_T^2)
SP(I, θ) := I/(2*n_p*θ*K_PP*U_T^2)
# Compute output resistance
K_dsn := sqrt(2*ε_Si/(q_e*N_A)) = 0.0781049 μm/sqrt(V)
K_dsp := sqrt(2*ε_Si/(q_e*N_D)) = 0.113158 μm/sqrt(V)
ϕ_o := 0.8 V
PB_n := 0.69 V
PB_p := 1.02 V
VEN(L) := 2*L*sqrt(PB_n)/K_dsn
VEP(L) := 2*L*sqrt(PB_p)/K_dsp
# Equations used to compute transconductance.
GMN(I, θ) :=
    out ← (1 - e^(-sqrt(θ)))/sqrt(θ)*I/(n_n*U_T)
    return out
GMP(I, θ) :=
    out ← (1 - e^(-sqrt(θ)))/sqrt(θ)*I/(n_p*U_T)
    return out
# Functions to compute gate-drain capacitance
CGDN(W) :=
    out ← W*0.12*fF/μm
    return out
CGDP(W) :=
    out ← W*0.086*fF/μm
    return out
# Functions used to compute the DB and SB capacitance
LDIFF := 0.7 μm
CXBN(W) :=
    out ← W*LDIFF*0.84*fF/μm^2 + 2*(W + LDIFF)*0.25*fF/μm
    return out
CXBP(W) :=
    out ← W*LDIFF*1.36*fF/μm^2 + 2*(W + LDIFF)*0.35*fF/μm
    return out
# Function used to compute the gate-source capacitance
CGS(W, L) :=
    out ← 2/3*W*L*C_ox
    return out
# Equations used to compute noise spectral density
# First the thermal density
SVTN(I, θ) :=
    (γ ← 1/(1 + θ)*(1/2 + 2/3*θ))
    out ← 4*U_T*q_e*n_n*γ/GMN(I, θ)
    return out
SVTP(I, θ) :=
    (γ ← 1/(1 + θ)*(1/2 + 2/3*θ))
    out ← 4*U_T*q_e*n_p*γ/GMP(I, θ)
    return out
# Design a butfer for the multiplicity output.
I_mult := 12 μA
R_S := 8.4*KΩ
C_S := 0.5 pF
V_max := 16*I_mult*R_S = 1.6128 V
Δ := V_max/16 = 100.8 mV
# We want our 10 - 90 time to be less than about 50 ns
t_10_90 := 50 ns
τ_eq_needed := t_10_90/2.2 = 22.7273 ns
# Transistor M1 is the PFET input device and M2 is the PFET current source load.
# Let's assume a maximum capacitive load.
C_L := 15 pF
# Determine slew rate.
I_B/C_L == V_max/τ_eq_needed
I_B := V_max*C_L/τ_eq_needed = 1.06445 mA
# Make the effective voltage of the two FETs the same.
V_EFF := 1/2*(V_DD - |V_TP0| - V_max) = 0.4936 V
V_EFF1 := 400 mV
V_EFF2 := 400 mV
g_m1 := 2*I_B/V_EFF1 = 0.00532224 1/Ω
R_out := 1/g_m1 = 187.891 Ω
τ_eq := R_S*C_S + C_L/g_m1 = 7.01836 ns
S_1 := 2*I_B*n_p/(K_PP*V_EFF1^2) = 266.112
L_1 := 0.7 μm
W_1 := S_1*L_1 = 186.278 μm
W_1/2 = 93.1392 μm
θ_1 := θP(I_B, S_1) = 41.4093
r_ds1 := VEP(L_1)/I_B = 11.7386 kΩ
W_2 := W_1 = 186.278 μm
g_ds1 := 1/r_ds1 = 8.51887e-5 1/Ω
g_m1 = 0.00532224 1/Ω
g_ds2 := g_ds1
C_gs1 := CGS(W_1, L_1) = 394.966 fF
C_gd1 := CGDP(W_1) = 16.0199 fF
C_gd1 := CGDP(W_2) = 16.0199 fF
C_db2 := CXBP(W_2/2) = 0.154356 pF
# Use resistor to get bias current.
R_B := (V_DD - |V_TP0| - V_EFF2)/I_B = 2.0668 kΩ
# Compute the -3dB bandwidth.
τ_eq = 7.01836 ns
BW := 1/(2*π)*1/τ_eq = 22.6769 MHz
# SPICE says 27 MHz
# We have overshoot so poles are complex.  Let's see where they are
G_Leq := g_ds1 + g_ds2 = 0.000170377 1/Ω
K := g_m1/(g_m1 + G_Leq) = 0.968981
T(s) == K*(1 + C_gs1/g_m1*s)/(a*s^2 + b*s + 1)
# Lefthand-side zero
s_z := g_m1/C_gs1 = 1.34752e10 1/s
s_z/(2*π) = 2.14464e9 Hz
# Find out where the poles are
a := (C_gs1*(C_S + C_gd1) + (C_S + C_gd1)*C_L + C_gs1*C_L)*R_S/(G_Leq + g_m1) = 2.12096e-17 s^2
b := (C_gs1 + (C_S + C_gd1)*R_S*G_Leq + C_L + C_gs1*G_Leq*R_S + C_S*g_m1*R_S)/(g_m1 + G_Leq) = 7.10993e-9 s
ω_0 := 1/sqrt(a) = 217136937 1/s
ω_0/(2*π) = 34.5584 MHz
Q := 1/(ω_0*b) = 0.64774
θ := atan(sqrt(4*Q^2 - 1)) = 0.688949  # about 40 degrees
percent_overshoot := 100*e^(-π/sqrt(4*Q^2 - 1)) = 2.20465
# If Q is less than 0.5 then we have real poles and no overshoot.
C_S := C_S + 0.5 pF = 1 pF  # Increase Cs by 0.5 pF.
τ_eq := R_S*C_S + C_L/g_m1 = 11.2184 ns
t_10_90 := 2.2*τ_eq = 24.6804 ns
a := (C_gs1*(C_S + C_gd1) + (C_S + C_gd1)*C_L + C_gs1*C_L)*R_S/(G_Leq + g_m1) = 3.29816e-17 s^2
b := (C_gs1 + (C_S + C_gd1)*R_S*G_Leq + C_L + C_gs1*G_Leq*R_S + C_S*g_m1*R_S)/(g_m1 + G_Leq) = 1.13099e-8 s
ω_0 := 1/sqrt(a) = 174126306 1/s
ω_0/(2*π) = 27.7131 MHz
Q := 1/(ω_0*b) = 0.50778
θ := atan(sqrt(4*Q^2 - 1)) = 0.175275  # about 10 degrees
percent_overshoot := 100*e^(-π/sqrt(4*Q^2 - 1)) = 1.97555e-6
