# NOWLIN CIRCUIT ANALYSIIS
# Signal
s(x) == k*A*(1 - e^(-x/τ_r))
# Delayed signal
d(x) == A*(1 - e^(-x/τ_r) - (x/τ_r)*e^(-x/τ_r))
# Lets take the derivative
d/dx(A*(1 - e^(-x/τ_r) - (x/τ_r)*e^(-x/τ_r))) → A*x*e^(-x/τ_r)/τ_r^2
d/dx(k*A*(1 - e^(-x/τ_r))) → A*k*e^(-x/τ_r)/τ_r
# So the nowlin output is
A := 20 mV
τ_r := 3 ns
k := 0.67
nowlin(t) := A*(1 - e^(-t/τ_r) - (t/τ_r)*e^(-t/τ_r)) - k*A*(1 - e^(-t/τ_r))
ddt(t) := A*t*e^(-t/τ_r)/τ_r^2 - A*k*e^(-t/τ_r)/τ_r
# Find roots
t_0 := 2*τ_r = 6 ns
root(nowlin(t_0), t_0) = 5.75782 ns
# We cross 0 at about:
time_zero_cross := 2*τ_r = 6 ns
# Let's plot the nowlin signal.
t := 0, 0.25 ns .. 20 ns
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# We see that the zero cross occurs at about 2 * risetime constant.
# Plot the derivative
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# At the zero cross the derivative is
A*(2 - k)*e^-2/τ_r = 1.19997 V/μs
# or about
A/(5*τ_r) = 1.33333 V/μs
