# The transfer function in the forward path is
A_0 := 4
m := 5
K_1 := A_0^m = 1024
f_1 := 100 MHz
ω_1 := 2*π*f_1 = 628318531 1/s
A(s) := K_1/(1 + s/ω_1)^m
# The transfer function on the feedback path is
K_2 := 0.1
f_2 := 1 kHz
ω_2 := 2*π*f_2 = 6283.19 1/s
B(s) := K_2/(1 + s/ω_2)
# For m =5
K := K_1*K_2*ω_1^5*ω_2 = 6.30056e49 1/s^6
ωω
K_1*K_2 = 102.4
D(s) := (s + ω_1)^5*(s + ω_2)
(s + ω_1)^5*(s + ω_2)
a := 2*π*1*kHz
s := -ω_1  # (a complex guess)
s1 := root(D(s) + K, s)
s1 = -653035 1/s
|s1| = 653035 1/s
arg(s1) = 180 deg
# The conjugate is also a root.
s2 := Re(s1) - Im(s1)*1j
s2 = -653035 1/s
|s2| = 653035 1/s
arg(s2) = 180 deg
|s2|/(2*π) = 0.103934 MHz
# To find the real root, use a real guess:
s3 := K_2*ω_2
s3 := root(D(s3) + K, s3)
s3 = -653035 1/s
s3/(2*π) = -0.103934 MHz
