fF := 10^-15*F
fC := 10^-15*C
# Process parameters for the AMS C35 Process (3V option)
R_PH := 1200 Ω  # Typical sheet resistance for RPOLYH resistor
α_PH := -0.75*10^-3  # Thermal coefficient for RPOLYH resistor
R_P2 := 50 Ω  # Typical sheet resistance for RPOLY2 resistor
α_P2 := 0.59*10^-3  # Thermal coefficient for RPOLY2 resistor
C_pp := 860*fF/μm^2  # Area capacitance for double poly capacitors fF/um^2
α_pp := 30*10^-6  # Thermal coefficient for double poly caps
V_TN0 := 0.5 V  # Threshold voltages fo NMOS
V_TP0 := -0.7 V  # Threshold voltage for PMOS
n_n := 1.3  # Subthreshold slope factor for NMOS
n_p := 1.2  # Subthreshold slope factor for PMOS
V_DD := 3.3 V  # Supply voltage
# Transconductance parameter
K_PN := 170*μA/V^2
K_PP := 60*μA/V^2
Ρ := K_PN/K_PP = 2.83333
# Matching parameters:
A_KPN := 0.007*μm
A_VTN := 9.4 mV*μm
A_KVP := 0.01*μm
A_VTP := 14.5 mV*μm
Permitivity
ε_o := 8.854*10^-14*F/cm
ε_SiO2 := 3.9*ε_o = 3.45306e-13 F/cm
ε_Si := 11.7*ε_o = 1.03592e-12 F/cm
t_ox := 7.6 nm
C_ox := ε_SiO2/t_ox = 4.5435 fF/μm^2  # Oxide capacitance per unit area
# Substrate doping levels
N_A := 212*10^15*cm^-3  # P-SUBSTRATE
N_D := 101*10^15*cm^-3  # NWELL
# Intrinsic concentration
n_i := 1.05*10^10*cm^-3
# Thermal voltage:
U_T := 25.9 mV
# Electronic charge:
q_e := 1.602*10^-19*C
# IMPORTANT FUNCTIONS
# Functions to compute inversion coefficient.
θN(I, S) := I/(2*n_n*S*K_PN*U_T^2)
θP(I, S) := I/(2*n_p*S*K_PP*U_T^2)
# Equation used to compute saturation voltage.
VSATP(θ) := 2*n_p*U_T*sqrt(θ)/(1 - e^(-sqrt(θ)))
VSATN(θ) := 2*n_n*U_T*sqrt(θ)/(1 - e^(-sqrt(θ)))
# Equation used to compute shape factor given θ and I.
SN(I, θ) := I/(2*n_n*θ*K_PN*U_T^2)
SP(I, θ) := I/(2*n_p*θ*K_PP*U_T^2)
# Compute output resistance
K_dsn := sqrt(2*ε_Si/(q_e*N_A)) = 0.0781049 μm/sqrt(V)
K_dsp := sqrt(2*ε_Si/(q_e*N_D)) = 0.113158 μm/sqrt(V)
ϕ_o := 0.8 V
PB_n := 0.69 V
PB_p := 1.02 V
VEN(L) := 2*L*sqrt(PB_n)/K_dsn
VEP(L) := 2*L*sqrt(PB_p)/K_dsp
# Equations used to compute transconductance.
GMN(I, θ) :=
    out ← (1 - e^(-sqrt(θ)))/sqrt(θ)*I/(n_n*U_T)
    return out
GMP(I, θ) :=
    out ← (1 - e^(-sqrt(θ)))/sqrt(θ)*I/(n_p*U_T)
    return out
# Functions to compute gate-drain capacitance
CGDN(W) :=
    out ← W*0.12*fF/μm
    return out
CGDP(W) :=
    out ← W*0.086*fF/μm
    return out
# Functions used to compute the DB and SB capacitance
LDIFF := 0.7 μm
CXBN(W) :=
    out ← W*LDIFF*0.84*fF/μm^2 + 2*(W + LDIFF)*0.25*fF/μm
    return out
CXBP(W) :=
    out ← W*LDIFF*1.36*fF/μm^2 + 2*(W + LDIFF)*0.35*fF/μm
    return out
# Function used to compute the gate-source capacitance
CGS(W, L) :=
    out ← 2/3*W*L*C_ox
    return out
# Function used to compute the poly 2 capacitance
CP2(W, L) :=
    out ← 0*fF/μm^2*(W*L) + 0.05*fF/μm*2*(W + L)
    return out
# Function used to compute the well capacitance
CWELL(W, L) :=
    out ← 0.08*fF/μm^2*(W*L) + 0.5*fF/μm*2*(W + L)
    return out
# Equations used to compute noise spectral density
# First the thermal density
SVTN(I, θ) :=
    (γ ← 1/(1 + θ)*(1/2 + 2/3*θ))
    out ← 4*U_T*q_e*n_n*γ/GMN(I, θ)
    return out
SVTP(I, θ) :=
    (γ ← 1/(1 + θ)*(1/2 + 2/3*θ))
    out ← 4*U_T*q_e*n_p*γ/GMP(I, θ)
    return out
# Transistors M1 and M2 are the input devices.
# Transistors M3 and M4 are the load devices.
# Transistor in tail of differential pair is M5.
# We want a low-frequency gain and bandwidth of stage
G := 3.3
BW := 250 MHz
GBW := G*BW = 825 MHz
# Pick tail current.
I_B := 46 μA
I_1 := I_B/2 = 23 μA
W_1 := 16 μm
L_1 := 0.7 μm
S_1 := W_1/L_1 = 22.8571
θ_1 := θN(I_1, S_1) = 3.39378
V_eff1 := VSATN(θ_1) = 0.147415 V
# Find the input transconductance and output resistance.
g_m1 := GMN(I_1, θ_1) = 0.000312043 1/Ω
r_o1 := VEN(L_1)/I_1 = 647.361 kΩ
A_o := g_m1*r_o1 = 202.005
# Compute thermal noise of amp
v_ni := sqrt(2)*sqrt(4*q_e*U_T*(2/3)*(1/g_m1)*BW) = 0.000133151 V
# For a given slew rate what will be the jitter
τ_r := 3 ns
Amp := 15 mV
SR := Amp/(4*τ_r) = 1.25 V/μs
FWHM := 2.35*v_ni/SR = 250.323 ps
# Find the resistor value that will give us a gain of G.
G := 3.2
R_g := G/g_m1 = 10.255 kΩ
# What is the maximum differential output voltage?
VDIFF_max := 2*I_B*R_g = 0.943459 V
# What is the input offset voltage?
σ_os := 1/sqrt(W_1*L_1)*sqrt(A_VTN^2 + (I_1/g_m1)^2*A_KPN^2) = 2.81302 mV
OFFSET := 3*σ_os = 8.43905 mV
# Now let's look at the load device.
W_3 := 2 μm
L_3 := 0.7 μm
S_3 := W_3/L_3 = 2.85714
I_3 := I_1 = 23 μA
# Find the input transconductance and output resistance.
θ_3 := θP(I_3, S_3) = 83.3362
g_m3 := GMP(I_1, θ_1) = 0.000338047 1/Ω
r_o3 := VEP(L_3)/I_3 = 543.269 kΩ
# What is the effective voltage?
V_eff3 := VSATP(θ_3) = 0.567512 V
# Now size the FET in the tail.
W_5 := 16 μm
L_5 := 4 μm
S_5 := W_5/L_5 = 4
θ_5 := θN(I_B, S_5) = 38.7861
# Compute the effective voltage.
V_eff5 := VSATN(θ_5) = 0.420213 V
# Need to design a resistive FET for Rg. | Use NFET.
V_TN6 := 0.8 V
V_MID := V_DD/2 = 1.65 V
W_6 := 1.2 μm
L_6 := 1.8 μm
S_6 := W_6/L_6 = 0.666667
R_g = 10255 Ω
R_6 := 1.0/(S_6*K_PN*(V_DD - V_MID - V_TN6)) = 10380.6 Ω
# Compute the GBW
C_in := CGS(W_1, L_1) + (1 + G)*CGDN(W_1) = 41.9888 fF
C_out := CXBN(W_1) + CGDN(W_1) = 19.678 fF
C_L := C_in + C_out = 61.6668 fF
GBW := 1/(2*π)*g_m1/C_L = 805.348 MHz
BW := GBW/G = 251.671 MHz
# What is the slew rate?
SR_amp := I_B/C_L = 0.745944 V/ns
