fF := 10^-15*F
fC := 10^-15*C
# Process parameters for the AMS C35 Process (3V option)
R_PH := 1200 Ω  # Typical sheet resistance for RPOLYH resistor
α_PH := -0.75*10^-3  # Thermal coefficient for RPOLYH resistor
R_P2 := 50 Ω  # Typical sheet resistance for RPOLY2 resistor
α_P2 := 0.59*10^-3  # Thermal coefficient for RPOLY2 resistor
C_pp := 860*fF/μm^2  # Area capacitance for double poly capacitors fF/um^2
α_pp := 30*10^-6  # Thermal coefficient for double poly caps
V_TN0 := 0.5 V  # Threshold voltages fo NMOS
V_TP0 := -0.7 V  # Threshold voltage for PMOS
n_n := 1.3  # Subthreshold slope factor for NMOS
n_p := 1.2  # Subthreshold slope factor for PMOS
V_DD := 3.3 V  # Supply voltage
# Transconductance parameter
K_PN := 170*μA/V^2
K_PP := 60*μA/V^2
Ρ := K_PN/K_PP = 2.83333
# Matching parameters:
A_KPN := 0.007*μm
A_VTN := 9.4 mV*μm
A_KVP := 0.01*μm
A_VTP := 14.5 mV*μm
Permitivity
ε_o := 8.854*10^-14*F/cm
ε_SiO2 := 3.9*ε_o = 3.45306e-13 F/cm
t_ox := 7.6 nm
ε_Si := 11.7*ε_o = 1.03592e-12 F/cm
C_ox := ε_SiO2/t_ox = 4.5435 fF/μm^2  # Oxide capacitance per unit area
# Substrate doping levels
N_A := 212*10^15*cm^-3  # P-SUBSTRATE
N_D := 101*10^15*cm^-3  # NWELL
# Intrinsic concentration
n_i := 1.05*10^10*cm^-3
# Thermal voltage:
U_T := 25.9 mV
# Electronic charge:
q_e := 1.602*10^-19*C
# IMPORTANT FUNCTIONS
# Functions to compute inversion coefficient.
θN(I, S) := I/(2*n_n*S*K_PN*U_T^2)
θP(I, S) := I/(2*n_p*S*K_PP*U_T^2)
# Equation used to compute saturation voltage.
VSATP(θ) := 2*n_p*U_T*sqrt(θ)/(1 - e^(-sqrt(θ)))
VSATN(θ) := 2*n_n*U_T*sqrt(θ)/(1 - e^(-sqrt(θ)))
# Equation used to compute shape factor given θ and I.
SN(I, θ) := I/(2*n_n*θ*K_PN*U_T^2)
SP(I, θ) := I/(2*n_p*θ*K_PP*U_T^2)
# Compute output resistance
K_dsn := sqrt(2*ε_Si/(q_e*N_A)) = 0.0781049 μm/sqrt(V)
K_dsp := sqrt(2*ε_Si/(q_e*N_D)) = 0.113158 μm/sqrt(V)
ϕ_o := 0.8 V
PB_n := 0.69 V
PB_p := 1.02 V
VEN(L) := 2*L*sqrt(PB_n)/K_dsn
VEP(L) := 2*L*sqrt(PB_p)/K_dsp
# Equations used to compute transconductance.
GMN(I, θ) :=
    out ← (1 - e^(-sqrt(θ)))/sqrt(θ)*I/(n_n*U_T)
    return out
GMP(I, θ) :=
    out ← (1 - e^(-sqrt(θ)))/sqrt(θ)*I/(n_p*U_T)
    return out
# Functions to compute gate-drain capacitance
CGDN(W) :=
    out ← W*0.12*fF/μm
    return out
CGDP(W) :=
    out ← W*0.086*fF/μm
    return out
# Functions used to compute the DB and SB capacitance
LDIFF := 0.7 μm
CXBN(W) :=
    out ← W*LDIFF*0.84*fF/μm^2 + 2*(W + LDIFF)*0.25*fF/μm
    return out
CXBP(W) :=
    out ← W*LDIFF*1.36*fF/μm^2 + 2*(W + LDIFF)*0.35*fF/μm
    return out
# Function used to compute the gate-source capacitance
CGS(W, L) :=
    out ← 2/3*W*L*C_ox
    return out
# Function used to compute the poly 2 capacitance
CP2(W, L) :=
    out ← 0*fF/μm^2*(W*L) + 0.05*fF/μm*2*(W + L)
    return out
# Function used to compute the well capacitance
CWELL(W, L) :=
    out ← 0.08*fF/μm^2*(W*L) + 0.5*fF/μm*2*(W + L)
    return out
# Equations used to compute noise spectral density
# First the thermal density
SVTN(I, θ) :=
    (γ ← 1/(1 + θ)*(1/2 + 2/3*θ))
    out ← 4*U_T*q_e*n_n*γ/GMN(I, θ)
    return out
SVTP(I, θ) :=
    (γ ← 1/(1 + θ)*(1/2 + 2/3*θ))
    out ← 4*U_T*q_e*n_p*γ/GMP(I, θ)
    return out
# We have a 100 K resistor which converts the bandgap voltage to a current.
# We will build as 8 ztc resistors in series.
# ZTC resistor will be 7K RPOLY 2 and 5.5K RPOLYH
L_HY := 9.2 μm
W_HY := 2 μm
L_NY := 280 μm
W_NY := 2 μm
R_0 := 8*(R_P2*L_NY/W_NY + R_PH*L_HY/W_HY) = 100160 Ω
C_0 := 10*(2*CP2(2 μm, 98 μm) + CP2(2 μm, 6.6 μm)) = 208.6 fF
# Hence, we have a parasitic pole at
ω_p := 1/(R_0*C_0) = 47862059 1/s
f_p := ω_p/(2*π) = 7.61748 MHz
# M0 and R0 form a CS amplifier
V_BG := 1.2 V
I_B0 := V_BG/R_0 = 11.9808 μA
# Compute the transconductance of M0.
L_0 := 20 μm
W_0 := 6 μm
S_0 := W_0/L_0 = 0.3
θ_0 := θP(I_B0, S_0) = 413.432
g_m0 := GMP(I_B0, θ_0) = 1.89585e-5 1/Ω
V_EFF0 := VSATP(θ_0) = 1.2639 V
V_SG0 := |V_TP0| + V_EFF0 = 1.9639 V
A_2 := g_m0*R_0 = 1.89888
20*log(A_2) = 5.56997
# Hence the unity gain frequency of the OTA must less than
f_u := f_p/(3*A_2) = 1337.19 kHz
C_L := 17*CGS(W_0, L_0) = 6.17916e-12 F
g_mi_max := C_L*2*π*f_u = 5.1916e-5 1/Ω
# Choose the bias current for the OTA
I_B := 11.5 μA/2 = 5.75e-6 A
S_i := 0.6
θ_i := θP(I_B/2, S_i) = 49.6049
g_mi := GMP(I_B/2, θ_i) = 1.31225e-5 1/Ω
V_EFFi := VSATP(θ_i) = 0.43818 V
t_slew := V_BG/(I_B/C_L) = 1.28956 μs
t_settle := 5*C_L/g_mi = 2.35442e-6 s
