# Analysis of frequency response of CMOS common source amplifier.
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eq1 := (v_in - v_1)*G_s == v_1*s*C_gs + (v_1 - v_out)*s*C_gd
eq2 := (v_1 - v_out)*s*C_gd == g_m*v_1 + (G_Leq + s*C_Leq)*v_out
answer := [eq1; eq2] solve, [v_out; v_1] → [-(G_s*g_m*v_in - C_gd*G_s*s*v_in)/(G_s*G_Leq + C_gd*g_m*s + C_gd*C_gs*s^2 + C_gd*C_Leq*s^2 + C_gs*C_Leq*s^2 + C_gd*G_s*s + C_Leq*G_s*s + C_gd*G_Leq*s + C_gs*G_Leq*s), (G_s*G_Leq*v_in + C_gd*G_s*s*v_in + C_Leq*G_s*s*v_in)/(G_s*G_Leq + C_gd*g_m*s + C_gd*C_gs*s^2 + C_gd*C_Leq*s^2 + C_gs*C_Leq*s^2 + C_gd*G_s*s + C_Leq*G_s*s + C_gd*G_Leq*s + C_gs*G_Leq*s)]
TF := answer[:, 0][0] → -(G_s*g_m*v_in - C_gd*G_s*s*v_in)/(G_s*G_Leq + C_gd*g_m*s + C_gd*C_gs*s^2 + C_gd*C_Leq*s^2 + C_gs*C_Leq*s^2 + C_gd*G_s*s + C_Leq*G_s*s + C_gd*G_Leq*s + C_gs*G_Leq*s)
TF := TF collect, s → -(G_s*g_m*v_in - C_gd*G_s*s*v_in)/((C_gd*C_gs + C_gd*C_Leq + C_gs*C_Leq)*s^2 + (C_gd*G_s + C_Leq*G_s + C_gd*G_Leq + C_gs*G_Leq + C_gd*g_m)*s + G_s*G_Leq)
TF := TF collect, v_in → (-(G_s*g_m - C_gd*G_s*s)/((C_gd*C_gs + C_gd*C_Leq + C_gs*C_Leq)*s^2 + (C_gd*G_s + C_Leq*G_s + C_gd*G_Leq + C_gs*G_Leq + C_gd*g_m)*s + G_s*G_Leq))*v_in
TF(s) := TF/v_in → -(G_s*g_m - C_gd*G_s*s)/((C_gd*C_gs + C_gd*C_Leq + C_gs*C_Leq)*s^2 + (C_gd*G_s + C_Leq*G_s + C_gd*G_Leq + C_gs*G_Leq + C_gd*g_m)*s + G_s*G_Leq)
N(s) := numer(TF(s)) → C_gd*G_s*s - G_s*g_m
D(s) := denom(TF(s)) → G_s*G_Leq + C_gd*g_m*s + C_gd*C_gs*s^2 + C_gd*C_Leq*s^2 + C_gs*C_Leq*s^2 + C_gd*G_s*s + C_Leq*G_s*s + C_gd*G_Leq*s + C_gs*G_Leq*s
N(s) := N(s)/(G_s*g_m) → -(G_s*g_m - C_gd*G_s*s)/(G_s*g_m) simplify → C_gd*s/g_m - 1
D(s) := D(s)/(G_s*g_m) simplify → (G_Leq + C_gd*s + C_Leq*s)/g_m + (C_gd*g_m*s + C_gd*C_gs*s^2 + C_gd*C_Leq*s^2 + C_gs*C_Leq*s^2 + C_gd*G_Leq*s + C_gs*G_Leq*s)/(G_s*g_m)
D(s) := D(s) collect, s → (C_gd*C_gs + C_gd*C_Leq + C_gs*C_Leq)/(G_s*g_m)*s^2 + ((C_gd + C_Leq)/g_m + (C_gd*G_Leq + C_gs*G_Leq + C_gd*g_m)/(G_s*g_m))*s + G_Leq/g_m
D(s) := D(s)/(G_Leq/g_m) → g_m*(G_Leq/g_m + s*((C_gd + C_Leq)/g_m + (C_gd*G_Leq + C_gs*G_Leq + C_gd*g_m)/(G_s*g_m)) + s^2*(C_gd*C_gs + C_gd*C_Leq + C_gs*C_Leq)/(G_s*g_m))/G_Leq
D(s) := D(s) collect, s → (C_gd*C_gs + C_gd*C_Leq + C_gs*C_Leq)/(G_s*G_Leq)*s^2 + g_m*((C_gd + C_Leq)/g_m + (C_gd*G_Leq + C_gs*G_Leq + C_gd*g_m)/(G_s*g_m))/G_Leq*s + 1
D(s) := D(s) substitute, G_s == 1/R_s → (G_Leq + C_gd*s + C_Leq*s + C_gd*G_Leq*R_s*s + C_gs*G_Leq*R_s*s + C_gd*R_s*g_m*s + C_gd*C_gs*R_s*s^2 + C_gd*C_Leq*R_s*s^2 + C_gs*C_Leq*R_s*s^2)/G_Leq
D(s) := D(s) substitute, G_Leq == 1/R_Leq → C_gd*R_s*s + C_gs*R_s*s + C_gd*R_Leq*s + C_Leq*R_Leq*s + C_gd*C_gs*R_s*R_Leq*s^2 + C_gd*C_Leq*R_s*R_Leq*s^2 + C_gs*C_Leq*R_s*R_Leq*s^2 + C_gd*R_s*R_Leq*g_m*s + 1
D(s) := D(s) collect, s → (C_gd*C_gs*R_s*R_Leq + C_gd*C_Leq*R_s*R_Leq + C_gs*C_Leq*R_s*R_Leq)*s^2 + (C_gd*R_s + C_gs*R_s + C_gd*R_Leq + C_Leq*R_Leq + C_gd*R_s*R_Leq*g_m)*s + 1
D_save(s) := D(s)
T(s) := N(s)/D(s)  # Transfer function.
N(s) := g_m*R_L.eq*(C_gd*s/g_m - 1)
D(s) := b*s^2 + a*s + 1 == (1 - s/p_1)*(1 - s/p_2)
where
b := C_gd*C_gs*R_s*R_Leq + C_gd*C_Leq*R_s*R_Leq + C_gs*C_Leq*R_s*R_Leq
a := C_gd*R_s + C_gs*R_s + C_gd*R_Leq + C_Leq*R_Leq + C_gd*R_s*R_Leq*g_m
D(s) := 1 - s*(1/p_1 + 1/p_2) + s^2/(p_1*p_2)
# Assume p1 is the dominant (low-frequency) pole and p2 is the parasitic (high-frequency) pole.
# Then (approximately)
D(s) := 1 - s/p_1 + s^2/(p_1*p_2)
# This makes it easy to determine p1 and p2.
p_1 := -1/a → -1/(C_gd*R_s + C_gs*R_s + C_gd*R_Leq + C_Leq*R_Leq + C_gd*R_s*R_Leq*g_m)
p_1 := p_1 collect, C_gd → -1/(C_gs*R_s + C_Leq*R_Leq + C_gd*(R_s + R_Leq + R_s*R_Leq*g_m))
p_1 := -1/((C_gs*R_s + C_Leq*R_Leq + C_gd*R_Leq) + C_gd*(1 + g_m*R_Leq)*R_s)
p_1 := p_1 substitute, C_gd*(1 + g_m*R_Leq) == C_M → -1/(C_M*R_s + C_gs*R_s + C_gd*R_Leq + C_Leq*R_Leq)
p_1 := p_1 collect, R_Leq, R_s → -1/(R_s*(C_M + C_gs) + R_Leq*(C_gd + C_Leq))
# Note this is essentially the same expression we get using Miller's Theorem.
# Now let's consider the parasitic pole.
p_2 := -a/b → -(C_gd*R_s + C_gs*R_s + C_gd*R_Leq + C_Leq*R_Leq + C_gd*R_s*R_Leq*g_m)/(C_gd*C_gs*R_s*R_Leq + C_gd*C_Leq*R_s*R_Leq + C_gs*C_Leq*R_s*R_Leq)
# While this is reasonably accurate its not very informative.  Difficult to make design decisions
# based on that expression.
p_2 := p_2 collect, C_gd, R_Leq, R_s → -(C_gd*(R_s + R_Leq*(R_s*g_m + 1)) + C_gs*R_s + C_Leq*R_Leq)/(C_gs*C_Leq*R_s*R_Leq + C_gd*R_s*R_Leq*(C_gs + C_Leq))
# Let us consider the most likely scenario.
p_2a := -(C_gd*(R_s + R_Leq*(R_s*g_m)) + C_gs*R_s + C_Leq*R_Leq)/(C_gs*C_Leq*R_s*R_Leq + C_gd*R_s*R_Leq*(C_gs + C_Leq))
p_2a := p_2a collect, R_s, R_Leq → -(C_Leq*R_Leq + R_s*(C_gd + C_gs + C_gd*R_Leq*g_m))/(R_s*R_Leq*(C_gd*C_gs + C_gd*C_Leq + C_gs*C_Leq))
# Drop first term in numerator
p_2a := -R_s*(C_gd + C_gs + C_gd*R_Leq*g_m)/(R_s*R_Leq*(C_gd*C_gs + C_gd*C_Leq + C_gs*C_Leq))
p_2a := -R_s*(C_gd*R_Leq*g_m)/(R_s*R_Leq*(C_gd*C_gs + C_gd*C_Leq + C_gs*C_Leq))
p_2a := p_2a simplify → -C_gd*g_m/(C_gd*C_gs + C_gd*C_Leq + C_gs*C_Leq)
p_2a := p_2a collect, C_Leq → -C_gd*g_m/(C_Leq*(C_gd + C_gs) + C_gd*C_gs)
p_2a := -g_m/(C_Leq*(1 + C_gs/C_gd) + C_gs)
# Let's see what happens if Rs=0 then
D_save(s) := D_save(s) substitute, R_s == 0 → C_gd*R_Leq*s + C_Leq*R_Leq*s + 1
D_save(s) := D_save(s) collect, s, R_Leq → (C_gd + C_Leq)*R_Leq*s + 1
