# Let us determine the doping of both the global substrate and the local nwells. After
# doing this let's compute the subthreshold slope factors for both the NFET and the PFET
γ == sqrt(2*q_e*ε_si*N_sub)/C_ox solve, N_sub → C_ox^2*γ^2/(2*q_e*ε_si)
fF := 10^-15*F
ε_o := 8.854*10^-14*F/cm
ε_SiO2 := 3.9*ε_o = 3.45306e-13 F/cm
ε_Si := 11.7*ε_o = 1.03592e-12 F/cm
t_ox := 7.6 nm
# Oxide capacitance per unit area
C_ox := ε_SiO2/t_ox = 4.5435 fF/μm^2
# For the global substrate
q_e := 1.602*10^-19*C
γ_n := 0.58*V^(1/2)
N_A := C_ox^2*γ_n^2/(2*q_e*ε_Si) = 2.09228e17 cm^-3
# For the NWELL
γ_p := 0.4*V^(1/2)
N_D := C_ox^2*γ_p^2/(2*q_e*ε_Si) = 9.95138e16 cm^-3
# We need to compute the Fermi potentials
U_T := 25.9 mV
n_i := 1.05*10^10*cm^-3
ϕ_FN := U_T*ln(N_A/n_i) = 0.435316 V
ϕ_FP := -U_T*ln(N_D/n_i) = -0.416069 V
# For NFETs the subthreshold slope factor is
n_n(V_SB) := 1 + γ_n/(2*sqrt(2*|ϕ_FN| + V_SB))
V_SB := 0 V, 0.4 V .. 3.6 V
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# For PFETs the subthreshold slope factor is
n_p(V_BS) := 1 + γ_p/(2*sqrt(2*|ϕ_FP| + V_BS))
V_BS := 0 V, 0.4 V .. 3.6 V
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# Let us plot the threshold voltage for a NFET as function of Vsb.
V_TN0 := 0.46 V
V_SB := 0, 0.4 V .. 3.6 V
V_TN(V_SB) := V_TN0 + γ_n*(sqrt(2*|ϕ_FN| + V_SB) - sqrt(2*|ϕ_FN|))
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# Let us plot the threshold voltage for a PFET as function of Vbs.
V_TP0 := -0.68 V
V_TP(V_BS) := V_TP0 - γ_p*(sqrt(2*|ϕ_FP| + V_BS) - sqrt(2*|ϕ_FP|))
V_BS := 0 V, 0.4 V .. 3.6 V
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# Now let's try to compute channel length modulation factors,
# Now let's look at channel length modulation effects.
K_dsn := sqrt(2*ε_Si/(q_e*N_A)) = 0.0786207 μm/sqrt(V)
K_dsp := sqrt(2*ε_Si/(q_e*N_D)) = 0.114 μm/sqrt(V)
ϕ_oN := 0.69 V
ϕ_oP := 1.02 V
# Channel length modulation factor.
λ == K_dsn/(2*L*sqrt(V_DS - V_eff + ϕ_o))
# Worst case is when Vds is Veff.  Also, let's compute for L = 1 um.
λ_N(L_n) := K_dsn/(2*L_n*sqrt(ϕ_oN))
λ_P(L_p) := K_dsp/(2*L_p*sqrt(ϕ_oP))
λ_N(1 μm) = 0.0473241 1/V
λ_P(1 μm) = 0.0564384 1/V
V_EN := 1/λ_N(1 μm) = 21.1309 V
V_EP := 1/λ_P(1 μm) = 17.7184 V
