# The objective of problem is to design a 1.25 kΩ POLY2 resistor.
R_NY == RSH_NY/S_NY
S_NY == RSH_NY/R_NY
S_NY == W_NY/L_NY
# The typical sheet resistance for NY poly.
RSH_NY := 50 Ω
# We desire
R_NY := 1250 Ω
S_NY := RSH_NY/R_NY = 0.04
1/S_NY = 25
# Choose width
W_NY := 4 μm
L_NY := W_NY/S_NY = 100 μm
AREA_NY := L_NY*W_NY = 400 μm^2
