# The objective of this problem is to design a 1.25 kΩ HY resistor.
R_HY == RSH_HY/S_HY
S_NY == RSH_NY/R_NY
S_NY == W_HY/L_HY
# The typical sheet resistance for HY poly.
RSH_HY := 1200 Ω
# We desire
R_HY := 1250 Ω
S_HY := RSH_HY/R_HY = 0.96
1/S_HY = 1.04167
# Choose length
L_HY := 10 μm
W_HY := L_HY*S_HY = 9.6 μm  # ok .. greater than 4 um
AREA_HY := L_HY*W_HY = 96 μm^2
