# The objective of the problem is to design a 1.25 pF double poly capacitor.  We learned in
# class that square capacitors are best if we need to match them so we will make the
# capcitor square.
fF := 10^-15*F
C_x := 1.25 pF
C_pp := 0.86*fF/μm^2
L_cap := sqrt(C_x/C_pp) = 38.1246 μm
# Used a capacitor voltage divider to determine Cx (bottom leg of divider).
V_x == C_x/(C_ref + C_x)*V_ref
# Use Vref of 1 Volt.
C_x == C_ref*(1/V_x - 1/V)
