# Process parameters for the AMI 0.5 micron process.
fF := 10^-15*F
fC := 10^-15*C
# Threshold voltages
V_TN := 0.75 V
V_TP := -0.85 V
# Subthreshold slope factor
n := 1.5
# Supply voltage
V_DD := 5 V
# Transconductance parameter
K_PN := 120*μA/V^2
K_PP := 35*μA/V^2
Ρ := K_PN/K_PP = 3.42857
# Oxide capacitance per unit area
C_ox := 2.5*10^-15*F/μm^2
# Substrate doping levels
N_A := 4.4*10^16*cm^-3
N_D := 5.9*10^16*cm^-3
# Intrinsic concentration
n_i := 1.05*10^10*cm^-3
Permitivity
ε_o := 8.854*10^-14*F/cm
ε_SiO2 := 3.9*ε_o = 3.45306e-13 F/cm
ε_Si := 11.7*ε_o = 1.03592e-12 F/cm
# Thermal voltage:
U_T := 25.9 mV
# Electronic charge:
q_e := 1.602*10^-19*C
# Flicker noise parameters (current noise)
K_aP := 3.8*10^-30*A*F
K_aN := 6.3*10^-26*A*F
# Flicker noise current density
i_n2 := K_a*I_B/(C_OX*L^2)*df/f  # error: This variable is undefined.
v_n2 := i_n2/g_m^2 → I_B*K_a*df/(C_OX*L^2*f*g_m^2)  # error: This variable is undefined.
# If the device is strongly inverted then we can write
v_n2 := v_n2 substitute, g_m == sqrt(2*I_B*S*K_P/n_sub) → K_a*df*n_sub/(2*C_OX*K_P*L^2*S*f)  # error: This variable is undefined.
v_n2 := v_n2 substitute, S == W/L → K_a*df*n_sub/(2*C_OX*K_P*L*W*f)  # error: This variable is undefined.
v_n2 := v_n2 substitute, K_a*n_sub/(2*K_P) == K_v → K_v*df/(C_OX*L*W*f)  # error: This variable is undefined.
# So let us compute
K_vP := K_aP*n/(2*K_PP) = 8.14286e-26 J
K_vN := K_aN*n/(2*K_PN) = 3.9375e-22 J
# IMPORTANT FUNCTIONS
# Functions to compute inversion coefficient.
θN(I, S) := I/(2*n*S*K_PN*U_T^2)
θP(I, S) := I/(2*n*S*K_PP*U_T^2)
# Equation used to compute saturation voltage.
VSAT(θ) := 2*n*U_T*sqrt(θ)/(1 - e^(-sqrt(θ)))
# Equation used to compute shape factor given θ and I.
SN(I, θ) := I/(2*n*θ*K_PN*U_T^2)
SP(I, θ) := I/(2*n*θ*K_PP*U_T^2)
# Compute output resistance in a different way.
K_dsn := sqrt(2*ε_Si/(q_e*N_A)) = 0.171443 μm/sqrt(V)
K_dsp := sqrt(2*ε_Si/(q_e*N_D)) = 0.148054 μm/sqrt(V)
# Compute the built-in potential.
ϕ_o := U_T*ln(N_A*N_D/n_i^2) = 0.797461 V
VEN_MAX(θ, L) := 2*L*sqrt(ϕ_o)/K_dsn
VEN_MIN(θ, L) := 2*L*sqrt(V_DD/2 - 2*n*U_T*sqrt(θ)/(1 - e^(-sqrt(θ))) + ϕ_o)/K_dsn
VEN_AVE(θ, L) := L*sqrt(ϕ_o)/K_dsn + L*sqrt(V_DD/2 - 2*n*U_T*sqrt(θ)/(1 - e^(-sqrt(θ))) + ϕ_o)/K_dsn
VEP_MAX(θ, L) := 2*L*sqrt(ϕ_o)/K_dsp
VEP_MIN(θ, L) := 2*L*sqrt(V_DD/2 - 2*n*U_T*sqrt(θ)/(1 - e^(-sqrt(θ))) + ϕ_o)/K_dsp
VEP_AVE(θ, L) := L*sqrt(ϕ_o)/K_dsp + L*sqrt(V_DD/2 - 2*n*U_T*sqrt(θ)/(1 - e^(-sqrt(θ))) + ϕ_o)/K_dsp
# Equations used to compute transconductance.
GM(I, θ) :=
    out ← (1 - e^(-sqrt(θ)))/sqrt(θ)*I/(n*U_T)
    return out
# Functions to compute gate capacitance
CGN(I, θ, L) :=
    out ← C_ox*I*L^2/(2*n*θ*K_PN*U_T^2)
    return out
CGP(I, θ, L) :=
    out ← C_ox*I*L^2/(2*n*θ*K_PP*U_T^2)
    return out
# Functions to compute gate-drain capacitance
CGDN(W) :=
    out ← W*0.2*fF/μm
    return out
CGDP(W) :=
    out ← W*0.2*fF/μm
    return out
# Functions used to compute the DB and SB capacitance
LDIFF := 1.2 μm
CXBN(W) :=
    out ← W*LDIFF*0.416*fF/μm^2 + 2*(W + LDIFF)*0.345*fF/μm
    return out
CXBP(W) :=
    out ← W*LDIFF*0.710*fF/μm^2 + 2*(W + LDIFF)*0.236*fF/μm
    return out
# Function used to compute the gate-source capacitance
CGS(W, L) :=
    out ← 2/3*W*L*C_ox
    return out
# Equations used to compute noise spectral density
# First the thermal density
SVT(I, θ) :=
    (γ ← 1/(1 + θ)*(1/2 + 2/3*θ))
    out ← 4*U_T*q_e*n*γ/GM(I, θ)
    return out
# Now the flicker noise densities.
SVFN(I, θ, L) :=
    α ← (1 - e^(-sqrt(θ)))/sqrt(θ)
    out ← n^2*U_T^2*K_aN/(α^2*I*C_ox*L^2)
    return out
SVFP(I, θ, L) :=
    α ← (1 - e^(-sqrt(θ)))/sqrt(θ)
    out ← n^2*U_T^2*K_aP/(α^2*I*C_ox*L^2)
    return out
# M1 is an NFET input device.
#
# M3 is PFET diode connected load device
# We want a DC gain of 5.
K := -5
L_3 := 2 μm
W_3 := 4 μm
S_3 := W_3/L_3 = 2
# Find S1
S_1 := K_PP/K_PN*K^2*S_3 = 14.5833
L_1 := 2 μm
W_1 := S_1*L_1 = 29.1667 μm
σ_os := 20 mV*μm/sqrt(W_1*L_1) = 2.61861 mV
3*σ_os = 7.85584 mV
# Compute input capacitance
C_in := CGS(W_1, L_1) + (1 - K)*CGDN(W_1) = 132.222 fF
# Compute parastic capacitance on the output node.
C_p := CGS(W_3, L_3) + CXBN(W_1) + CXBP(W_3) = 54.7087 fF
C_L := C_in + C_p = 186.931 fF
GBW := 800 MHz
g_m1 := 2*π*C_L*GBW = 0.000939617 1/Ω
I_B1 := g_m1^2/(2*S_1*K_PN/1.3) = 327.927 μA
I_B3 := I_B1 = 0.000327927 A
g_m3 := g_m1/|K| = 0.000187923 1/Ω
θ_1 := θN(I_B1, S_1) = 93.1148
VSAT(θ_1) = 0.749822 V
θ_3 := θP(I_B3, S_3) = 2327.87
VSAT(θ_3) = 3.74887 V  # Too large!!!!
# What is use our trick.
I_B3 := I_B1/2 = 0.000163964 A
S_3 := g_m3^2/(2*I_B3*K_PP/1.7) = 5.23077
θ_3 := θP(I_B3, S_3) = 445.034
VSAT(θ_3) = 1.63915 V  # That is much better!
W_3 := S_3*L_3 = 10.4615 μm
C_p := CGS(W_3, L_3) + CXBN(W_1) + CXBP(W_3) = 84.8023 fF
C_L := C_in + C_p = 217.024 fF
g_m1/(2*π*C_L) = 689.069 MHz
I_5 := 2*I_B1 = 655.854 μA
# Size the tail current transistor.
L_5 := 4 μm
W_5 := 100 μm
S_5 := W_5/L_5 = 25
θ_5 := θN(I_5, S_5) = 108.634
VSAT(θ_5) = 0.809873 V
g_ds1 := I_B1/VEN_MIN(θ_1, L_1) = 8.8058e-6 1/Ω
g_ds3 := I_B3/VEP_MIN(θ_3, L_3) = 4.71275e-6 1/Ω
VSAT(θ_3) = 1.63915 V
V_SG3 := VSAT(θ_3) + |V_TP| = 2.48915 V
g_m1 = 0.000939617 1/Ω
g_m3 = 0.000187923 1/Ω
gain_check := g_m1/g_m3 = 5
# Need to find shape factors for the two PFET current loads devices.
# The effective voltage of device M7 must be less than VSG3
# Choose it to be 2 V < 2.5 V
V_EFF7 := 2 V
I_B7 := I_B3 = 0.000163964 A
S_7 := 2*I_B7/(K_PP*V_EFF7^2) = 2.34234
# Choose
L_7 := 2 μm
W_7 := S_7*L_7 = 4.68467 μm
# Now look at thermal noise performance of the diff amp
# Adds extra capacitance to output node but proabably won't make much difference.
SVT(I_B1, θ_1) = 1.89242e-17 V^2/Hz
BW := GBW/|K| = 160 MHz
input_noise := sqrt(2)*sqrt(SVT(I_B1, θ_1))*sqrt(BW) = 77.8187 μV
SVT(I_B3, θ_3) = 8.29123e-17 V^2/Hz
load_noise := sqrt(2)*sqrt(SVT(I_B3, θ_3))*sqrt(BW) = 162.886 μV
total_input_noise := sqrt(input_noise^2 + load_noise^2/K^2) = 84.3625 μV
