fF := 10^-15*F
fC := 10^-15*C
# Process parameters for the AMS C35 Process (3V option)
R_PH := 1200 Ω  # Typical sheet resistance for RPOLYH resistor
α_HY := -0.75*10^-3  # Thermal coefficient for RPOLY2 resistor
R_P2 := 50 Ω  # Typical sheet resistance for RPOLY2 resistor
α_P2 := 0.59*10^-3  # Thermal coefficient for RPOLY2 resistor
C_pp := 860*fF/μm^2  # Area capacitance for double poly capacitors fF/um^2
α_pp := 30*10^-6  # Thermal coefficient for double poly caps
V_TN := 0.5 V  # Threshold voltages fo NMOS
V_TP := -0.7 V  # Threshold voltage for PMOS
n_n := 1.3  # Subthreshold slope factor for NMOS
n_p := 1.2  # Subthreshold slope factor for PMOS
V_DD := 3.3 V  # Supply voltage
# Transconductance parameter
K_PN := 170*μA/V^2
K_PP := 60*μA/V^2
Ρ := K_PN/K_PP = 2.83333
Permitivity
ε_o := 8.854*10^-14*F/cm
ε_SiO2 := 3.9*ε_o = 3.45306e-13 F/cm
t_ox := 7.6 nm
ε_Si := 11.7*ε_o = 1.03592e-12 F/cm
C_ox := ε_SiO2/t_ox = 4.5435 fF/μm^2  # Oxide capacitance per unit area
# Substrate doping levels
N_A := 212*10^15*cm^-3  # P-SUBSTRATE
N_D := 101*10^15*cm^-3  # NWELL
# Intrinsic concentration
n_i := 1.05*10^10*cm^-3
# Thermal voltage:
U_T := 25.9 mV
# Electronic charge:
q_e := 1.602*10^-19*C
# IMPORTANT FUNCTIONS
# Functions to compute inversion coefficient.
θN(I, S) := I/(2*n_n*S*K_PN*U_T^2)
θP(I, S) := I/(2*n_p*S*K_PP*U_T^2)
# Equation used to compute saturation voltage.
VSATP(θ) := 2*n_p*U_T*sqrt(θ)/(1 - e^(-sqrt(θ)))
VSATN(θ) := 2*n_n*U_T*sqrt(θ)/(1 - e^(-sqrt(θ)))
# Equation used to compute shape factor given θ and I.
SN(I, θ) := I/(2*n_n*θ*K_PN*U_T^2)
SP(I, θ) := I/(2*n_p*θ*K_PP*U_T^2)
# Compute output resistance
K_dsn := sqrt(2*ε_Si/(q_e*N_A)) = 0.0781049 μm/sqrt(V)
K_dsp := sqrt(2*ε_Si/(q_e*N_D)) = 0.113158 μm/sqrt(V)
ϕ_o := 0.8 V
PB_n := 0.69 V
PB_p := 1.02 V
VEN(L) := 2*L*sqrt(PB_n)/K_dsn
VEP(L) := 2*L*sqrt(PB_p)/K_dsp
# Equations used to compute transconductance.
GMN(I, θ) :=
    out ← (1 - e^(-sqrt(θ)))/sqrt(θ)*I/(n_n*U_T)
    return out
GMP(I, θ) :=
    out ← (1 - e^(-sqrt(θ)))/sqrt(θ)*I/(n_p*U_T)
    return out
# Functions to compute gate capacitance
CGN(I, θ, L) :=
    out ← C_ox*I*L^2/(2*n_n*θ*K_PN*U_T^2)
    return out
CGP(I, θ, L) :=
    out ← C_ox*I*L^2/(2*n_p*θ*K_PP*U_T^2)
    return out
# Functions to compute gate-drain capacitance
CGDN(W) :=
    out ← W*0.1*fF/μm
    return out
CGDP(W) :=
    out ← W*0.1*fF/μm
    return out
# Functions used to compute the DB and SB capacitance
LDIFF := 0.7 μm
CXBN(W) :=
    out ← W*LDIFF*0.84*fF/μm^2 + 2*(W + LDIFF)*0.25*fF/μm
    return out
CXBP(W) :=
    out ← W*LDIFF*1.36*fF/μm^2 + 2*(W + LDIFF)*0.35*fF/μm
    return out
# Function used to compute the gate-source capacitance
CGS(W, L) :=
    out ← 2/3*W*L*C_ox
    return out
# Equations used to compute noise spectral density
# First the thermal density
SVTN(I, θ) :=
    (γ ← 1/(1 + θ)*(1/2 + 2/3*θ))
    out ← 4*U_T*q_e*n_n*γ/GMN(I, θ)
    return out
SVTP(I, θ) :=
    (γ ← 1/(1 + θ)*(1/2 + 2/3*θ))
    out ← 4*U_T*q_e*n_p*γ/GMP(I, θ)
    return out
# Now the flicker noise densities.
SVFP(I, θ, L) :=
    α ← (1 - e^(-sqrt(θ)))/sqrt(θ)
    out ← n_p^2*U_T^2*K_aP/(α^2*I*C_ox*L^2)
    return out  # error: This variable is undefined.
SVFN(I, θ, L) :=
    α ← (1 - e^(-sqrt(θ)))/sqrt(θ)
    out ← n_n^2*U_T^2*K_aN/(α^2*I*C_ox*L^2)
    return out  # error: This variable is undefined.
# Transistors M1 and M2 are the input devices.
# Transistors M3 and M4 are the load devices.
# Transistor in tail of differential pair is M5.
# We want a low-frequency gain of 5:
K := -5
# Size the load device
W_3 := 1.0 μm
L_3 := 1 μm
S_3 := W_3/L_3 = 1
V_E3 := VEP(L_3) = 17.8503 V
# Find the shape factor of input device
S_1 := (K_PP/n_p)/(K_PN/n_n)*K^2*S_3 = 9.55882
L_1 := 1.2 μm
V_E1 := VEN(L_1) = 25.5245 V
W_1 := S_1*L_1 = 11.4706 μm
σ_os := 9.4 mV*μm/sqrt(W_1*L_1) = 2.53364 mV
3*σ_os = 7.60091 mV
# Compute input capacitance
C_in := CGS(W_1, L_1) + (1 - K)*CGDN(W_1) = 48.5756 fF
# Compute parastic capacitance on the output node.
C_p := 2*CGS(W_3, L_3) + CXBN(W_1) + CXBP(W_3) = 21.03 fF
C_L := C_in + C_p = 69.6056 fF
GBW := 500 MHz
g_m1 := 2*π*C_L*GBW = 0.000218673 1/Ω
I_B1 := g_m1^2/(2*S_1*K_PN/n_n) = 19.1271 μA
θN(I_B1, S_1) = 6.74874
I_B3 := I_B1 = 1.91271e-5 A
g_m3 := g_m1/|K| = 4.37345e-5 1/Ω
θP(I_B3, S_3) = 198.01
θ_1 := θN(I_B1, S_1) = 6.74874
VSATN(θ_1) = 0.189007 V
θ_3 := θP(I_B3, S_3) = 198.01
VSATP(θ_3) = 0.874691 V
I_B := 2*I_B1 = 3.82542e-5 A
SR := I_B/C_L = 549.584 V/μs  # SLEW RATE
# Size M5.
L_5 := 5 μm
W_5 := 10 μm
S_5 := W_5/L_5 = 2
θ_5 := θN(I_B, S_5) = 64.51
VSATN(θ_5) = 0.541038 V
# Now look at thermal noise performance of the diff amp
SVTN(I_B1, θ_1) = 6.87749e-17 V^2/Hz
BW := GBW/|K| = 100 MHz
input_noise := sqrt(2)*sqrt(SVTN(I_B1, θ_1))*sqrt(BW) = 117.282 μV
SVTP(I_B3, θ_3) = 3.03209e-16 V^2/Hz
load_noise := sqrt(2)*sqrt(SVTP(I_B3, θ_3))*sqrt(BW) = 246.256 μV
total_input_noise := sqrt(input_noise^2 + load_noise^2/K^2) = 127.203 μV
