# Process parameters for the AMI 0.5 micron process.
fF := 10^-15*F
fC := 10^-15*C
# Threshold voltages
V_TN := 0.75 V
V_TP := -0.85 V
# Subthreshold slope factor
n := 1.5
# Supply voltage
V_DD := 5 V
# Transconductance parameter
K_PN := 120*μA/V^2
K_PP := 35*μA/V^2
Ρ := K_PN/K_PP = 3.42857
# Oxide capacitance per unit area
C_ox := 2.5*10^-15*F/μm^2
# Substrate doping levels
N_A := 4.4*10^16*cm^-3
N_D := 5.9*10^16*cm^-3
# Intrinsic concentration
n_i := 1.05*10^10*cm^-3
Permitivity
ε_o := 8.854*10^-14*F/cm
ε_SiO2 := 3.9*ε_o = 3.45306e-13 F/cm
ε_Si := 11.7*ε_o = 1.03592e-12 F/cm
# Thermal voltage:
U_T := 25.9 mV
# Electronic charge:
q_e := 1.602*10^-19*C
# Flicker noise parameters (current noise)
K_aP := 3.8*10^-30*A*F
K_aN := 6.3*10^-26*A*F
# Flicker noise current density
i_n2 := K_a*I_B/(C_OX*L^2)*df/f  # error: This variable is undefined.
v_n2 := i_n2/g_m^2 → I_B*K_a*df/(C_OX*L^2*f*g_m^2)  # error: This variable is undefined.
# If the device is strongly inverted then we can write
v_n2 := v_n2 substitute, g_m == sqrt(2*I_B*S*K_P/n_sub) → K_a*df*n_sub/(2*C_OX*K_P*L^2*S*f)  # error: This variable is undefined.
v_n2 := v_n2 substitute, S == W/L → K_a*df*n_sub/(2*C_OX*K_P*L*W*f)  # error: This variable is undefined.
v_n2 := v_n2 substitute, K_a*n_sub/(2*K_P) == K_v → K_v*df/(C_OX*L*W*f)  # error: This variable is undefined.
# So let us compute
K_vP := K_aP*n/(2*K_PP) = 8.14286e-26 J
K_vN := K_aN*n/(2*K_PN) = 3.9375e-22 J
# IMPORTANT FUNCTIONS
# Functions to compute inversion coefficient.
θN(I, S) := I/(2*n*S*K_PN*U_T^2)
θP(I, S) := I/(2*n*S*K_PP*U_T^2)
# Equation used to compute saturation voltage.
VSAT(θ) := 2*n*U_T*sqrt(θ)/(1 - e^(-sqrt(θ)))
# Equation used to compute shape factor given θ and I.
SN(I, θ) := I/(2*n*θ*K_PN*U_T^2)
SP(I, θ) := I/(2*n*θ*K_PP*U_T^2)
# Equations used to compute transconductance.
GM(I, θ) :=
    out ← (1 - e^(-sqrt(θ)))/sqrt(θ)*I/(n*U_T)
    return out
# Functions to compute gate capacitance
CGN(I, θ, L) :=
    out ← C_ox*I*L^2/(2*n*θ*K_PN*U_T^2)
    return out
CGP(I, θ, L) :=
    out ← C_ox*I*L^2/(2*n*θ*K_PP*U_T^2)
    return out
# Functions to compute gate-drain capacitance
CGDN(W) :=
    out ← W*0.2*fF/μm
    return out
CGDP(W) :=
    out ← W*0.2*fF/μm
    return out
# Functions used to compute the DB and SB capacitance
LDIFF := 1.2 μm
CXBN(W) :=
    out ← W*LDIFF*0.416*fF/μm^2 + 2*(W + LDIFF)*0.345*fF/μm
    return out
CXBP(W) :=
    out ← W*LDIFF*0.710*fF/μm^2 + 2*(W + LDIFF)*0.236*fF/μm
    return out
# Function used to compute the gate-source capacitance
CGS(W, L) :=
    out ← 2/3*W*L*C_ox
    return out
# Equations used to compute noise spectral density
# First the thermal density
SVT(I, θ) :=
    (γ ← 1/(1 + θ)*(1/2 + 2/3*θ))
    out ← 4*U_T*q_e*n*γ/GM(I, θ)
    return out
# Now the flicker noise densities.
SVFN(I, θ, L) :=
    α ← (1 - e^(-sqrt(θ)))/sqrt(θ)
    out ← n^2*U_T^2*K_aN/(α^2*I*C_ox*L^2)
    return out
SVFP(I, θ, L) :=
    α ← (1 - e^(-sqrt(θ)))/sqrt(θ)
    out ← n^2*U_T^2*K_aP/(α^2*I*C_ox*L^2)
    return out
# Early Voltage per unit length for NFETs and PFETs.
V_EN := 11.1*V/μm
V_EP := 12.5*V/μm
# Size the FETS in self-biasing diff-amp shown below.
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# Let PFET in inverter by M7 and NFET be M8
# M3 and M6 form a translinear loop.
V_SG3 + V_GS6 == V_DD
V_DD := 5 V
# We will start by sizing M6 which sets the tail current
Choose
V_GS6 := 1.5 V  # This will be the idling output voltage also.
Choose
S_6 := 10
L_6 := 0.6 μm
W_6 := S_6*L_6 = 6 μm
V_EFF6 := V_GS6 - V_TN = 750 mV
I_DS6 := V_EFF6^2*S_6*K_PN/(2*n) = 225 μA  # Seems reasonable
I_DS1 := I_DS6/2 = 112.5 μA
I_SD4 := I_DS1 = 0.0001125 A
# This current will be must larger by the end of transient.
# Now we will size the PFET M4
V_EFF4 := V_DD - V_EFF6 - |V_TP| - V_TN = 2.65 V
S_4 := 2*I_SD4*n/(K_PP*V_EFF4^2) = 1.37314
θ_4 := θP(I_SD4, S_4) = 1163.19
V_EFF4 := sqrt(2*I_SD4*n/(S_4*K_PP)) = 2.65 V
L_4 := 3 μm
W_4 := S_4*L_4 = 4.11941 μm
# Let's finish off with M1
# The DC gate voltage is around 2.5 V ... We need to make sure M6 does not go resistive.
# Choose
V_EFF1 := 750 mV
V_GS1 := V_TN + V_EFF1 = 1.5 V
# That gives us about 250 mV of safety ... probably oK
# But a little worried about body effect doing us in
S_1 := 2*I_DS1*n/(K_PN*V_EFF1^2) = 5
L_1 := 3 μm
W_1 := S_1*L_1 = 15 μm
# Determine the gain of diff amp.
V_E1 := V_EN*L_1 = 33.3 V
V_E4 := V_EP*L_4 = 37.5 V
r_ds1 := V_E1/I_DS1 = 296 kΩ
r_ds4 := V_E4/I_SD4 = 333.333 kΩ
g_ds1 := 1/r_ds1 = 3.37838e-6 1/Ω
g_ds4 := 1/r_ds4 = 3e-6 1/Ω
θ_1 := θN(I_DS1, S_1) = 93.1709
g_m1 := GM(I_DS1, θ_1) = 0.000299981 1/Ω
g_m3 := GM(I_SD4, θ_4) = 8.49057e-5 1/Ω
A_0 := g_m1/(g_ds1 + g_ds4) = 47.0309
A_1 := g_m1/g_m3 = 3.53311
# Compute bias current at end of the transient
I_DS6_MAX := 1/2*S_6/n*K_PN*(V_DD - V_TN - |V_TP|)^2 = 4.624 mA
# A  lot bigger than 225 uA at start.
# We also need to size the FETs in the inverter.
# We would like to make switching threshold of the inverter to the idling voltage of the
# diff amp which is 1.5 V.  Probably can't do it but we will do the best we can.
V_TH(α) := (V_TN + sqrt(α)*(V_DD - |V_TP|))/(1 + sqrt(α))
α := 0.01, 0.02 .. 0.1
α == S_p*K_PP/(S_n*K_PN)
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# Looks like alpha  of about 0.1 is what we want
α_opt := 0.1
V_sw := V_TH(α_opt) = 1.56686 V  # Prettly close to 1.5V
S_8 := 6  # NEFT
S_7 := α_opt*S_8*K_PN/K_PP = 2.05714  # PFET
L_7 := 0.6 μm
W_7 := S_7*L_7 = 1.23429 μm
L_8 := 0.6 μm
W_8 := S_8*L_8 = 3.6 μm
# Still need to design decision circuit.
I := 325 μA
C := (V_DD/2 - 2*V_TN)/sqrt(n*I/K_PN) = 0.496139
S_16 := 320  # Bottom diode connected device
L_16 := 0.6 μm
W_16 := S_16*L_16 = 192 μm
S_21 := 1/(C - (2/sqrt(S_16)))^2 = 6.76985  # Top FETs
L_21 := 0.6 μm
W_21 := S_21*L_21 = 4.06191 μm
θ_16 := θN(2*I, S_16) = 8.41127
V_EFF6 := sqrt(2*(2*I)*n/(S_16*K_PN)) = 0.225347 V
g_m16 := GM(2*I, θ_16) = 0.00545153 1/Ω
θ_21 := θN(I/2, S_21) = 99.3968
V_EFF21 := sqrt(I*n/(S_21*K_PN)) = 0.774653 V
2*V_TN = 1.5 V
