# MODELS and FUNCTIONS hidden
fF := 10^-15*F
fC := 10^-15*C
# Process parameters for the AMS C35 Process (3V option)
R_PH := 1200 Ω  # Typical sheet resistance for RPOLYH resistor
α_PH := -0.75*10^-3  # Thermal coefficient for RPOLYH resistor
R_P2 := 50 Ω  # Typical sheet resistance for RPOLY2 resistor
α_P2 := 0.59*10^-3  # Thermal coefficient for RPOLY2 resistor
C_pp := 860*fF/μm^2  # Area capacitance for double poly capacitors fF/um^2
α_pp := 30*10^-6  # Thermal coefficient for double poly caps
V_TN0 := 0.5 V  # Threshold voltages fo NMOS
V_TP0 := -0.7 V  # Threshold voltage for PMOS
n_n := 1.3  # Subthreshold slope factor for NMOS
n_p := 1.2  # Subthreshold slope factor for PMOS
V_DD := 3.3 V  # Supply voltage
# Transconductance parameter
K_PN := 170*μA/V^2
K_PP := 60*μA/V^2
Ρ := K_PN/K_PP = 2.83333
# Matching parameters:
A_KPN := 0.007*μm
A_VTN := 9.4 mV*μm
A_KVP := 0.01*μm
A_VTP := 14.5 mV*μm
Permitivity
ε_o := 8.854*10^-14*F/cm
ε_SiO2 := 3.9*ε_o = 3.45306e-13 F/cm
t_ox := 7.6 nm
ε_Si := 11.7*ε_o = 1.03592e-12 F/cm
C_ox := ε_SiO2/t_ox = 4.5435 fF/μm^2  # Oxide capacitance per unit area
# Substrate doping levels
N_A := 212*10^15*cm^-3  # P-SUBSTRATE
N_D := 101*10^15*cm^-3  # NWELL
# Intrinsic concentration
n_i := 1.05*10^10*cm^-3
# Thermal voltage:
U_T := 25.9 mV
# Electronic charge:
q_e := 1.602*10^-19*C
# IMPORTANT FUNCTIONS
# Functions to compute inversion coefficient.
θN(I, S) := I/(2*n_n*S*K_PN*U_T^2)
θP(I, S) := I/(2*n_p*S*K_PP*U_T^2)
# Equation used to compute saturation voltage.
VSATP(θ) := 2*n_p*U_T*sqrt(θ)/(1 - e^(-sqrt(θ)))
VSATN(θ) := 2*n_n*U_T*sqrt(θ)/(1 - e^(-sqrt(θ)))
# Equation used to compute shape factor given θ and I.
SN(I, θ) := I/(2*n_n*θ*K_PN*U_T^2)
SP(I, θ) := I/(2*n_p*θ*K_PP*U_T^2)
# Compute output resistance
K_dsn := sqrt(2*ε_Si/(q_e*N_A)) = 0.0781049 μm/sqrt(V)
K_dsp := sqrt(2*ε_Si/(q_e*N_D)) = 0.113158 μm/sqrt(V)
ϕ_o := 0.8 V
PB_n := 0.69 V
PB_p := 1.02 V
VEN(L) := 2*L*sqrt(PB_n)/K_dsn
VEP(L) := 2*L*sqrt(PB_p)/K_dsp
# Equations used to compute transconductance.
GMN(I, θ) :=
    out ← (1 - e^(-sqrt(θ)))/sqrt(θ)*I/(n_n*U_T)
    return out
GMP(I, θ) :=
    out ← (1 - e^(-sqrt(θ)))/sqrt(θ)*I/(n_p*U_T)
    return out
# Functions to compute gate-drain capacitance
CGDN(W) :=
    out ← W*0.12*fF/μm
    return out
CGDP(W) :=
    out ← W*0.086*fF/μm
    return out
# Functions used to compute the DB and SB capacitance
LDIFF := 0.7 μm
CXBN(W) :=
    out ← W*LDIFF*0.84*fF/μm^2 + 2*(W + LDIFF)*0.25*fF/μm
    return out
CXBP(W) :=
    out ← W*LDIFF*1.36*fF/μm^2 + 2*(W + LDIFF)*0.35*fF/μm
    return out
# Function used to compute the gate-source capacitance
CGS(W, L) :=
    out ← 2/3*W*L*C_ox
    return out
# Equations used to compute noise spectral density
# First the thermal density
SVTN(I, θ) :=
    (γ ← 1/(1 + θ)*(1/2 + 2/3*θ))
    out ← 4*U_T*q_e*n_n*γ/GMN(I, θ)
    return out
SVTP(I, θ) :=
    (γ ← 1/(1 + θ)*(1/2 + 2/3*θ))
    out ← 4*U_T*q_e*n_p*γ/GMP(I, θ)
    return out
K_FN := 2.2*10^-26*F*A^2
K_FP := 1.2*10^-26*F*A^2
V_EN := 21.1*V/μm
A_FN := 1.5
A_FP := 1.5
V_EP := 17.7*V/μm
# Noise predictions
N_flicker(I, L) := K_FN*(I/(1 A))^A_FN/(C_ox*L^2)
P_flicker(I, W, L) := K_FP*(I/(1 A))^A_FP/(C_ox*W*L)
# Consider a NFET
I_1 := 11.5 μA
W_1 := 20 μm
L_1 := 2 μm
S_1 := W_1/L_1 = 10
BI_1 := N_flicker(I_1, L_1) = 4.72084e-20 A^2
θ_1 := θN(I_1, S_1) = 3.87861
g_m1 := GMN(I_1, θ_1) = 0.000149227 1/Ω
V_EFF1 := 2*I_1/g_m1 = 0.154127 V
r_ds1 := V_EN*L_1/I_1 = 3.66957 MΩ  # Simulator reports 154 uMhos
BW := 100 MHz
f_l := 0.001 Hz
f_u := BW = 100000 kHz
η := sqrt(ln(f_u/f_l)) = 5.03274
V_nt1 := sqrt(4*U_T*q_e*2/3*1/g_m1*BW) = 86.1076 μV
V_nf1 := η*sqrt(BI_1)/g_m1 = 7.32766e-6 V
# Consider a PFET
I_2 := 11.5 μA
W_2 := 20 μm
L_2 := 2 μm
S_2 := W_2/L_2 = 10
BI_2 := P_flicker(I_2, W_2, L_2) = 2.575e-21 A^2
θ_2 := θP(I_2, S_2) = 11.9052
g_m2 := GMP(I_2, θ_2) = 0.000103835 1/Ω
V_EFF2 := 2*I_2/g_m2 = 0.221505 V
r_ds2 := V_EP*L_2/I_2 = 3.07826 MΩ  # Simulator reports 101 uMhos
A_0 := -g_m1*(r_ds1*r_ds2/(r_ds1 + r_ds2)) = -249.807
20*log(-A_0) = 47.9521
# Simulator reports about 50 dB
V_nf1 = 7.32766 μV
V_nt1 = 86.1076 μV
V_nf2 := η*sqrt(BI_2)/g_m2 = 2.45951 μV
V_nt2 := sqrt(4*U_T*q_e*2/3*1/g_m2*BW) = 103.227 μV
V_therm := sqrt(V_nt1^2 + (g_m2/g_m1)^2*V_nt2^2) = 112.132 μV
V_flicker := sqrt(V_nf1^2 + (g_m2/g_m1)^2*V_nf2^2) = 7.52485 μV
V_eq := sqrt(V_therm^2 + V_flicker^2) = 112.385 μV
V_n1 := sqrt(V_nt1^2 + V_nf1^2) = 86.4188 μV
V_n2 := (g_m2/g_m1)*sqrt(V_nt2^2 + V_nf2^2) = 71.8476 μV
V_eq := sqrt(V_n1^2 + V_n2^2) = 112.385 μV
1/g_m1*sqrt(4*U_T*q_e*(2/3)*g_m2*BW + 25*BI_2) = 7.18473e-5 V
sqrt(4*U_T*q_e*(2/3)*(1/g_m1)*(1 + g_m2/g_m1)*BW + ln(f_u/f_l)*(BI_1 + BI_2)*(1/g_m1)^2) = 0.000112385 V
