fF := 10^-15*F
fC := 10^-15*C
# Process parameters for the AMS C35 Process (3V option)
R_PH := 1200 Ω  # Typical sheet resistance for RPOLYH resistor
α_HY := -0.75*10^-3  # Thermal coefficient for RPOLY2 resistor
R_P2 := 50 Ω  # Typical sheet resistance for RPOLY2 resistor
α_P2 := 0.59*10^-3  # Thermal coefficient for RPOLY2 resistor
C_pp := 860*fF/μm^2  # Area capacitance for double poly capacitors fF/um^2
α_pp := 30*10^-6  # Thermal coefficient for double poly caps
V_TN0 := 0.5 V  # Threshold voltages fo NMOS
V_TP0 := -0.7 V  # Threshold voltage for PMOS
n_n := 1.3  # Subthreshold slope factor for NMOS
n_p := 1.2  # Subthreshold slope factor for PMOS
V_DD := 3.3 V  # Supply voltage
# Transconductance parameter
K_PN := 170*μA/V^2
K_PP := 60*μA/V^2
Ρ := K_PN/K_PP = 2.83333
# Matching parameters:
A_KPN := 0.007*μm
A_VTN := 9.4 mV*μm
A_KVP := 0.01*μm
A_VTP := 14.5 mV*μm
Permitivity
ε_o := 8.854*10^-14*F/cm
ε_SiO2 := 3.9*ε_o = 3.45306e-13 F/cm
t_ox := 7.6 nm
ε_Si := 11.7*ε_o = 1.03592e-12 F/cm
C_ox := ε_SiO2/t_ox = 4.5435 fF/μm^2  # Oxide capacitance per unit area
# Substrate doping levels
N_A := 212*10^15*cm^-3  # P-SUBSTRATE
N_D := 101*10^15*cm^-3  # NWELL
# Intrinsic concentration
n_i := 1.05*10^10*cm^-3
# Thermal voltage:
U_T := 25.9 mV
# Electronic charge:
q_e := 1.602*10^-19*C
# IMPORTANT FUNCTIONS
# Functions to compute inversion coefficient.
θN(I, S) := I/(2*n_n*S*K_PN*U_T^2)
θP(I, S) := I/(2*n_p*S*K_PP*U_T^2)
# Equation used to compute saturation voltage.
VSATP(θ) := 2*n_p*U_T*sqrt(θ)/(1 - e^(-sqrt(θ)))
VSATN(θ) := 2*n_n*U_T*sqrt(θ)/(1 - e^(-sqrt(θ)))
# Equation used to compute shape factor given θ and I.
SN(I, θ) := I/(2*n_n*θ*K_PN*U_T^2)
SP(I, θ) := I/(2*n_p*θ*K_PP*U_T^2)
# Compute output resistance
K_dsn := sqrt(2*ε_Si/(q_e*N_A)) = 0.0781049 μm/sqrt(V)
K_dsp := sqrt(2*ε_Si/(q_e*N_D)) = 0.113158 μm/sqrt(V)
ϕ_o := 0.8 V
PB_n := 0.69 V
PB_p := 1.02 V
VEN(L) := 2*L*sqrt(PB_n)/K_dsn
VEP(L) := 2*L*sqrt(PB_p)/K_dsp
# Equations used to compute transconductance.
GMN(I, θ) :=
    out ← (1 - e^(-sqrt(θ)))/sqrt(θ)*I/(n_n*U_T)
    return out
GMP(I, θ) :=
    out ← (1 - e^(-sqrt(θ)))/sqrt(θ)*I/(n_p*U_T)
    return out
# Functions to compute gate capacitance
CGN(I, θ, L) :=
    out ← C_ox*I*L^2/(2*n_n*θ*K_PN*U_T^2)
    return out
CGP(I, θ, L) :=
    out ← C_ox*I*L^2/(2*n_p*θ*K_PP*U_T^2)
    return out
# Functions to compute gate-drain capacitance
CGDN(W) :=
    out ← W*0.1*fF/μm
    return out
CGDP(W) :=
    out ← W*0.1*fF/μm
    return out
# Functions used to compute the DB and SB capacitance
LDIFF := 0.7 μm
CXBN(W) :=
    out ← W*LDIFF*0.84*fF/μm^2 + 2*(W + LDIFF)*0.25*fF/μm
    return out
CXBP(W) :=
    out ← W*LDIFF*1.36*fF/μm^2 + 2*(W + LDIFF)*0.35*fF/μm
    return out
# Function used to compute the gate-source capacitance
CGS(W, L) :=
    out ← 2/3*W*L*C_ox
    return out
# Equations used to compute noise spectral density
# First the thermal density
SVTN(I, θ) :=
    (γ ← 1/(1 + θ)*(1/2 + 2/3*θ))
    out ← 4*U_T*q_e*n_n*γ/GMN(I, θ)
    return out
SVTP(I, θ) :=
    (γ ← 1/(1 + θ)*(1/2 + 2/3*θ))
    out ← 4*U_T*q_e*n_p*γ/GMP(I, θ)
    return out
# Now the flicker noise densities.
SVFP(I, θ, L) :=
    α ← (1 - e^(-sqrt(θ)))/sqrt(θ)
    out ← n_p^2*U_T^2*K_aP/(α^2*I*C_ox*L^2)
    return out  # error: This variable is undefined.
SVFN(I, θ, L) :=
    α ← (1 - e^(-sqrt(θ)))/sqrt(θ)
    out ← n_n^2*U_T^2*K_aN/(α^2*I*C_ox*L^2)
    return out  # error: This variable is undefined.
# We want to design a one-shot (output pulse width is T) with very low jitter on both edges.
# Use a constant current to charge a capacitor.  Compare ramp to bandgap voltage (1.2 V).
# Voltage ramp is
v_ramp == I/C*T
σ_v == □  # σ_i*(T/C)
σ_i == sqrt(4*q_e*U_T*(2/3)*g_m)*sqrt(1/(2*π)*g_m/C*π/2)
σ_i == g_m*sqrt(k*T/C)*sqrt(2/3)
# Timing jiter can be found by taking
σ_j == σ_i*(T/C)/(I/C)
σ_j == (g_m/I)*sqrt(2/3)*sqrt(q_e*U_T/C*T)
σ_j == 2/V_EFF*sqrt(2/3)*sqrt(q_e*U_T/C)*T
# So to mimimize jitter we should make the effective voltage and cap as large as possible
# and the pulse width as short as possible.
# Compute jitter
C_L := 0.5 pF
T := 50 ns
I := 12 μA
# Stop charging when Vo reaches the bandgap voltage.
V_BG := 1.2 V
I := C_L*V_BG/T = 12 μA
V_EFF := 1 V
σ_j := 2/V_EFF*sqrt(2/3)*sqrt(q_e*U_T/C_L)*T = 7.4379 ps
C_L := 5 pF
T := 500 ns
I := C_L*V_BG/T = 12 μA
σ_j := 2/V_EFF*sqrt(2/3)*sqrt(q_e*U_T/C_L)*T = 23.5207 ps
C_L := 2 pF
T := 200 ns
I := C_L*V_BG/T = 12 μA
σ_j := 2/V_EFF*sqrt(2/3)*sqrt(q_e*U_T/C_L)*T = 14.8758 ps
# Start by sizing PFET M4.
I_4 := 12 μA
L_4 := 7.5 μm
W_4 := 3 μm
S_4 := W_4/L_4 = 0.4
θ_4 := θP(I_4, S_4) = 310.57
V_EFF4 := VSATP(θ_4) = 1.09545 V
# Make the cascode device M5 shape factor  4 times bigger
L_5 := 1 μm
W_5 := 1.6 μm
S_5 := W_5/L_5 = 1.6
θ_5 := θP(I_4, S_5) = 77.6425
V_EFF5 := VSATP(θ_5) = 0.547804 V
# Make the shape factor of M6 4/9 that of M4
S_6 := 4/9*S_4 = 0.177778
L_6 := 10 μm
W_6 := 1.8 μm
S_6 := W_6/L_6 = 0.18
θ_6 := θP(I_4, S_6) = 690.155
V_EFF6 := VSATP(θ_6) = 1.63299 V
# Shape our NFET current mirror.
W_14 := 1.6 μm
L_14 := 6 μm
S_14 := W_14/L_14 = 0.266667
θ_14 := θN(I_4, S_14) = 151.772
V_EFF14 := VSATN(θ_14) = 0.829603 V
