fF := 10^-15*F
fC := 10^-15*C
# Process parameters for the AMS C35 Process (3V option)
R_PH := 1200 Ω  # Typical sheet resistance for RPOLYH resistor
α_HY := -0.75*10^-3  # Thermal coefficient for RPOLY2 resistor
R_P2 := 50 Ω  # Typical sheet resistance for RPOLY2 resistor
α_P2 := 0.59*10^-3  # Thermal coefficient for RPOLY2 resistor
C_pp := 860*fF/μm^2  # Area capacitance for double poly capacitors fF/um^2
α_pp := 30*10^-6  # Thermal coefficient for double poly caps
V_TN0 := 0.5 V  # Threshold voltages fo NMOS
V_TP0 := -0.7 V  # Threshold voltage for PMOS
n_n := 1.3  # Subthreshold slope factor for NMOS
n_p := 1.2  # Subthreshold slope factor for PMOS
V_DD := 3.3 V  # Supply voltage
# Transconductance parameter
K_PN := 170*μA/V^2
K_PP := 60*μA/V^2
Ρ := K_PN/K_PP = 2.83333
# Matching parameters:
A_KPN := 0.007*μm
A_VTN := 9.4 mV*μm
A_KVP := 0.01*μm
A_VTP := 14.5 mV*μm
Permitivity
ε_o := 8.854*10^-14*F/cm
ε_SiO2 := 3.9*ε_o = 3.45306e-13 F/cm
t_ox := 7.6 nm
ε_Si := 11.7*ε_o = 1.03592e-12 F/cm
C_ox := ε_SiO2/t_ox = 4.5435 fF/μm^2  # Oxide capacitance per unit area
# Substrate doping levels
N_A := 212*10^15*cm^-3  # P-SUBSTRATE
N_D := 101*10^15*cm^-3  # NWELL
# Intrinsic concentration
n_i := 1.05*10^10*cm^-3
# Thermal voltage:
U_T := 25.9 mV
# Electronic charge:
q_e := 1.602*10^-19*C
# IMPORTANT FUNCTIONS
# Functions to compute inversion coefficient.
θN(I, S) := I/(2*n_n*S*K_PN*U_T^2)
θP(I, S) := I/(2*n_p*S*K_PP*U_T^2)
# Equation used to compute saturation voltage.
VSATP(θ) := 2*n_p*U_T*sqrt(θ)/(1 - e^(-sqrt(θ)))
VSATN(θ) := 2*n_n*U_T*sqrt(θ)/(1 - e^(-sqrt(θ)))
# Equation used to compute shape factor given θ and I.
SN(I, θ) := I/(2*n_n*θ*K_PN*U_T^2)
SP(I, θ) := I/(2*n_p*θ*K_PP*U_T^2)
# Compute output resistance
K_dsn := sqrt(2*ε_Si/(q_e*N_A)) = 0.0781049 μm/sqrt(V)
K_dsp := sqrt(2*ε_Si/(q_e*N_D)) = 0.113158 μm/sqrt(V)
ϕ_o := 0.8 V
PB_n := 0.69 V
PB_p := 1.02 V
VEN(L) := 2*L*sqrt(PB_n)/K_dsn
VEP(L) := 2*L*sqrt(PB_p)/K_dsp
# Equations used to compute transconductance.
GMN(I, θ) :=
    out ← (1 - e^(-sqrt(θ)))/sqrt(θ)*I/(n_n*U_T)
    return out
GMP(I, θ) :=
    out ← (1 - e^(-sqrt(θ)))/sqrt(θ)*I/(n_p*U_T)
    return out
# Functions to compute gate capacitance
CGN(I, θ, L) :=
    out ← C_ox*I*L^2/(2*n_n*θ*K_PN*U_T^2)
    return out
CGP(I, θ, L) :=
    out ← C_ox*I*L^2/(2*n_p*θ*K_PP*U_T^2)
    return out
# Functions to compute gate-drain capacitance
CGDN(W) :=
    out ← W*0.1*fF/μm
    return out
CGDP(W) :=
    out ← W*0.1*fF/μm
    return out
# Functions used to compute the DB and SB capacitance
LDIFF := 0.7 μm
CXBN(W) :=
    out ← W*LDIFF*0.84*fF/μm^2 + 2*(W + LDIFF)*0.25*fF/μm
    return out
CXBP(W) :=
    out ← W*LDIFF*1.36*fF/μm^2 + 2*(W + LDIFF)*0.35*fF/μm
    return out
# Function used to compute the gate-source capacitance
CGS(W, L) :=
    out ← 2/3*W*L*C_ox
    return out
# Equations used to compute noise spectral density
# First the thermal density
SVTN(I, θ) :=
    (γ ← 1/(1 + θ)*(1/2 + 2/3*θ))
    out ← 4*U_T*q_e*n_n*γ/GMN(I, θ)
    return out
SVTP(I, θ) :=
    (γ ← 1/(1 + θ)*(1/2 + 2/3*θ))
    out ← 4*U_T*q_e*n_p*γ/GMP(I, θ)
    return out
# Now the flicker noise densities.
SVFP(I, θ, L) :=
    α ← (1 - e^(-sqrt(θ)))/sqrt(θ)
    out ← n_p^2*U_T^2*K_aP/(α^2*I*C_ox*L^2)
    return out  # error: This variable is undefined.
SVFN(I, θ, L) :=
    α ← (1 - e^(-sqrt(θ)))/sqrt(θ)
    out ← n_n^2*U_T^2*K_aN/(α^2*I*C_ox*L^2)
    return out  # error: This variable is undefined.
# Simple Miller OTA wil be used as out CM Feedback Amp
# Transistors M9 and M10 are the input devices.
# Transistors M11 and M12 are the load devices.
# Transistor in tail of differential pair is M8.
# We want a low-frequency gain and bandwidth of stage
A0 := 500
BW := 10 kHz
GBW := A0*BW = 5 MHz
# Primary current of 11.5 uA
# Use current attenuator to divide down our primary current.
I_P := 11.5 μA
# Select numer of attenuator stages.
N := 6
I_B := I_P/2^N = 179.688 nA
I_9 := I_B/2 = 0.0898438 μA
W_9 := 4 μm
L_9 := 1 μm
S_9 := W_9/L_9 = 4
θ_9 := θN(I_9, S_9) = 0.0757541
V_eff9 := VSATN(θ_9) = 0.0770317 V
# Find the input transconductance and output resistance.
g_m9 := GMN(I_9, θ_9) = 2.33264e-6 1/Ω
r_ds9 := VEN(L_9)/I_9 = 236.749 MΩ
# Compute thermal noise of amp
v_ni := sqrt(2)*sqrt(4*q_e*U_T*(2/3)*(1/g_m9)*BW) = 9.73994e-6 V
# Compute the input offset voltage.
σ_os := 1/sqrt(W_9*L_9)*sqrt(A_VTN^2 + (I_9/g_m9)^2*A_KPN^2) = 4.70193 mV
# Compensate the OTA by putting a cap on output node.
# Use the cap to set the GBW.
C_C := 100*fF
f_u := 1/(2*π)*g_m9/C_C = 3.71252 MHz
# Implement the cap using a PMOS device.
W_C := sqrt(C_C/C_ox) = 4.69142 μm
# Now let's look at the load device.
W_12 := 0.5 μm
L_12 := 5 μm
S_12 := W_12/L_12 = 0.1
I_12 := I_9 = 89.8438 nA
θ_12 := θP(I_12, S_12) = 9.30092
r_ds12 := VEP(L_12)/I_12 = 993.405 MΩ
# Compute the effective voltage of the output device.
V_EFF12 := VSATP(θ_12) = 0.198999 V
# Compute output resistance.
R_o := r_ds9*r_ds12/(r_ds9 + r_ds12) = 191185543 Ω
A_o := g_m9*R_o = 445.968
f_d := f_u/A_o = 8.32463 kHz
# Size the tail current device, M8.
W_8 := 0.5 μm
L_8 := 10 μm
S_8 := W_8/L_8 = 0.05
I_B = 179.688 nA
θ_8 := θN(I_B, S_8) = 12.1207
