# MODELS AND FUNCTIONS
fF := 10^-15*F
fC := 10^-15*C
# Process parameters for the AMS C35 Process (3V option)
R_PH := 1200 Ω  # Typical sheet resistance for RPOLYH resistor
α_PH := -0.75*10^-3  # Thermal coefficient for RPOLYH resistor
R_P2 := 50 Ω  # Typical sheet resistance for RPOLY2 resistor
α_P2 := 0.59*10^-3  # Thermal coefficient for RPOLY2 resistor
C_pp := 860*fF/μm^2  # Area capacitance for double poly capacitors fF/um^2
α_pp := 30*10^-6  # Thermal coefficient for double poly caps
V_TN0 := 0.5 V  # Threshold voltages fo NMOS
V_TP0 := -0.7 V  # Threshold voltage for PMOS
n_n := 1.3  # Subthreshold slope factor for NMOS
n_p := 1.2  # Subthreshold slope factor for PMOS
V_DD := 3.3 V  # Supply voltage
# Transconductance parameter
K_PN := 170*μA/V^2
K_PP := 60*μA/V^2
Ρ := K_PN/K_PP = 2.83333
# Matching parameters:
A_KPN := 0.007*μm
A_VTN := 9.4 mV*μm
A_KPP := 0.01*μm
A_VTP := 14.5 mV*μm
Permitivity
ε_o := 8.854*10^-14*F/cm
ε_SiO2 := 3.9*ε_o = 3.45306e-13 F/cm
t_ox := 7.6 nm
ε_Si := 11.7*ε_o = 1.03592e-12 F/cm
C_ox := ε_SiO2/t_ox = 4.5435 fF/μm^2  # Oxide capacitance per unit area
# Substrate doping levels
N_A := 212*10^15*cm^-3  # P-SUBSTRATE
N_D := 101*10^15*cm^-3  # NWELL
# Intrinsic concentration
n_i := 1.05*10^10*cm^-3
# Thermal voltage:
U_T := 25.9 mV
# Electronic charge:
q_e := 1.602*10^-19*C
# IMPORTANT FUNCTIONS
# Functions to compute inversion coefficient.
θN(I, S) := I/(2*n_n*S*K_PN*U_T^2)
θP(I, S) := I/(2*n_p*S*K_PP*U_T^2)
# Equation used to compute saturation voltage.
VSATP(θ) := 2*n_p*U_T*sqrt(θ)/(1 - e^(-sqrt(θ)))
VSATN(θ) := 2*n_n*U_T*sqrt(θ)/(1 - e^(-sqrt(θ)))
# Equation used to compute shape factor given θ and I.
SN(I, θ) := I/(2*n_n*θ*K_PN*U_T^2)
SP(I, θ) := I/(2*n_p*θ*K_PP*U_T^2)
# Compute output resistance
K_dsn := sqrt(2*ε_Si/(q_e*N_A)) = 0.0781049 μm/sqrt(V)
K_dsp := sqrt(2*ε_Si/(q_e*N_D)) = 0.113158 μm/sqrt(V)
ϕ_o := 0.8 V
PB_n := 0.69 V
PB_p := 1.02 V
VEN(L) := 2*L*sqrt(PB_n)/K_dsn
VEP(L) := 2*L*sqrt(PB_p)/K_dsp
# Equations used to compute transconductance.
GMN(I, θ) :=
    out ← (1 - e^(-sqrt(θ)))/sqrt(θ)*I/(n_n*U_T)
    return out
GMP(I, θ) :=
    out ← (1 - e^(-sqrt(θ)))/sqrt(θ)*I/(n_p*U_T)
    return out
# Functions to compute gate-drain capacitance
CGDN(W) :=
    out ← W*0.12*fF/μm
    return out
CGDP(W) :=
    out ← W*0.086*fF/μm
    return out
# Functions used to compute the DB and SB capacitance
LDIFF := 0.7 μm
CXBN(W) :=
    out ← W*LDIFF*0.84*fF/μm^2 + 2*(W + LDIFF)*0.25*fF/μm
    return out
CXBP(W) :=
    out ← W*LDIFF*1.36*fF/μm^2 + 2*(W + LDIFF)*0.35*fF/μm
    return out
# Function used to compute the gate-source capacitance
CGS(W, L) :=
    out ← 2/3*W*L*C_ox
    return out
# Function used to compute the poly 2 capacitance
CP2(W, L) :=
    out ← 0.1*fF/μm^2*(W*L) + 0.05*fF/μm*2*(W + L)
    return out
# Function used to compute the well capacitance
CWELL(W, L) :=
    out ← 0.08*fF/μm^2*(W*L) + 0.5*fF/μm*2*(W + L)
    return out
# Equations used to compute noise spectral density
# First the thermal density
SVTN(I, θ) :=
    (γ ← 1/(1 + θ)*(1/2 + 2/3*θ))
    out ← 4*U_T*q_e*n_n*γ/GMN(I, θ)
    return out
SVTP(I, θ) :=
    (γ ← 1/(1 + θ)*(1/2 + 2/3*θ))
    out ← 4*U_T*q_e*n_p*γ/GMP(I, θ)
    return out
# FLICKER NOISE
K_FN := 2.2*10^-26*F*A^2
K_FP := 1.2*10^-26*F*A^2
A_FN := 1.5
A_FP := 1.5
BIN(I, L) := K_FN*(I/(1 A))^A_FN/(C_ox*L^2)
BIP(I, W, L) := K_FP*(I/(1 A))^A_FP/(C_ox*W*L)
# Designing the folded cascode for our zero tempco current reference.
# The primary current is 11.5 uA.
I_P := 11.5 μA
I_11 := I_P/2 = 5.75 μA
# We computed that we don't want the gm of input device above a certain max value.
I_1 := I_11/2 = 2.875 μA
g_m1 := 15.5*10^-6*1/Ω
V_EFF1 := 2*I_1/g_m1 = 0.370968 V
# Can we tolerate an effective voltage this large?
V_SG1 := |V_TP0| + V_EFF1 = 1.07097 V
# Choose effective voltage for tail device
V_EFF11 := 600 mV
S_11 := 2*I_11*n_p/(K_PP*V_EFF11^2) = 0.638889
I_11 = 5.75 μA
L_11 := 11 μm
W_11 := S_11*L_11 = 7.02778 μm
r_ds11 := VEP(L_11)/I_11 = 34.1483 MΩ
CMRR := 1 + 2*g_m1*r_ds11 = 1059.6
g_m == sqrt(2*S*I*K_pp/n_p)
S_1 := g_m1^2*n_p/(2*I_1*K_PP) = 0.835652
I_1 = 2.875 μA
L_1 := 6 μm
W_1 := S_1*L_1 = 5.01391 μm
r_ds1 := VEP(L_1)/I_1 = 37.2527 MΩ
# We need 3 sigma offset to be less than 10mV.
σ_os := 1/sqrt(W_1*L_1)*sqrt(A_VTP^2 + (V_EFF1/2)^2*A_KPP^2) = 2.66519 mV
# Choose effective voltage for M3 and M6..
# Need the sum not to exceed 1 V to meet our swing requirement.
V_EFF3 := 400 mV
V_EFF6 := 400 mV
I_3 := I_11 = 5.75 μA
I_6 := I_11/2 = 2.875 μA
S_3 := 2*I_3*n_n/(K_PN*V_EFF3^2) = 0.549632
S_6 := 2*I_6*n_n/(K_PN*V_EFF6^2) = 0.274816
θ_3 := θN(I_3, S_3) = 35.2837
VSATN(θ_3) = 0.401056 V
L_3 := 8 μm
W_3 := S_3*L_3 = 4.39706 μm
L_6 := 8 μm
W_6 := S_6*L_6 = 2.19853 μm
g_m3 := 2*I_3/V_EFF3 = 2.875e-5 1/Ω
r_ds3 := VEN(L_3)/I_3 = 29.5936 MΩ
g_m6 := 2*I_6/V_EFF6 = 1.4375e-5 1/Ω
r_ds6 := VEN(L_6)/I_6 = 59.1873 MΩ
R_on := (g_m6*r_ds6)*(r_ds3*r_ds1)/(r_ds1 + r_ds3) = 14031.8 MΩ
g_m1*R_on = 217493
# Need to size M8 and M10 PFETs.
V_EFF10 := 300 mV
V_EFF8 := 300 mV
I_8 := I_11/2 = 2.875 μA
I_10 := I_11/2 = 2.875 μA
S_8 := 2*I_8*n_p/(K_PP*V_EFF8^2) = 1.27778
S_10 := S_8 = 1.27778
L_8 := 4 μm
W_8 := S_8*L_8 = 5.11111 μm
g_m8 := 2*I_8/V_EFF8 = 1.91667e-5 1/Ω
g_m10 := g_m8 = 1.91667e-5 1/Ω
S_10 := S_8 = 1.27778
L_10 := L_8 = 4 μm
W_10 := S_10*L_10 = 5.11111 μm
r_ds8 := VEP(L_8)/I_8 = 24835132 Ω
r_ds10 := VEP(L_10)/I_10 = 24835132 Ω
R_op := (g_m8*r_ds8)*r_ds10 = 11821.7 MΩ
k := R_op/R_on = 0.842491
λ := (2 + k)/(2 + 2*k) = 0.771372
20*log(k) = -1.4887
R_out := R_on*R_op/(R_on + R_op) = 6.41615e9 Ω
A_0 := λ*g_m1*R_out = 76713.1
20*log(A_0) = 97.6974
# Need to size up M19 which generates VBCASN.
V_EFF19 := 1 V
I_19 := I_11 = 5.75 μA
V_GS19 := V_TN0 + V_EFF19 = 1.5 V
I_13 := I_11 = 5.75 μA
S_19 := 2*I_19*n_n/(K_PN*V_EFF19^2) = 0.0879412
L_19 := 25 μm
W_19 := S_19*L_19 = 2.19853 μm
