# In this problem we are to design a 1.0 kΩ resistor with a a 0 temperature coefficient.
# We showed in class that
E1 := S_NY == -R_SH_NY/R_SH_HY*α_NY/α_HY*S_HY  # error: This variable is undefined.
E2 := R_eq == R_SH_NY*1/S_NY + R_SH_HY*1/S_HY  # error: This variable is undefined.
# We have two equations and two unknowns: S_ny and S_hy
# Solve for the two unknowns.
S := [E1; E2] solve, [S_NY; S_HY] → [(R_SH_NY*α_HY - R_SH_NY*α_NY)/(R_eq*α_HY), -(R_SH_HY*α_HY - R_SH_HY*α_NY)/(R_eq*α_NY)]  # error: This variable is undefined.
# Typical sheet resistance for HY resistor
R_SH_HY := 1200 Ω
# Thermal coefficient for HY resistor
α_HY := -0.75*10^-3
# Typical sheet resistance for NY resistor
R_SH_NY := 50 Ω
# Thermal coefficient for NY resistor
α_NY := 0.59*10^-3
# The series connection of the HY and the NY resistors should yield a 1.0 kΩ equivalent.
R_eq := 1.0 kΩ
S_NY := (R_SH_NY*α_HY - R_SH_NY*α_NY)/(R_eq*α_HY) = 0.0893333
S_HY := -(R_SH_HY*α_HY - R_SH_HY*α_NY)/(R_eq*α_NY) = 2.72542
# If the 2.2 K resistor needs to match another 1.25 K resistor then I should use "big" resistors
# where the width is > 5μm and length > 20 μm.  I'll assume matching is important.
Choose
W_NY := 5 μm
L_NY := W_NY/S_NY = 55.9701 μm
Choose
L_HY := 20 μm
W_HY := S_HY*L_HY = 54.5085 μm
# These resistors are a reaonable size to use in layout.
# So the resistors are
R_NY := (L_NY/W_NY)*R_SH_NY = 0.559701 kΩ
R_HY := (L_HY/W_HY)*R_SH_HY = 440.299 Ω
R := R_NY + R_HY = 1 kΩ
# To make up for the overetch add 1.7 um to the Hy resistor length.
L_HY := 21.7 μm
R_HY/R = 0.440299
R_NY/R = 0.559701
