fF := 10^-15*F
fC := 10^-15*C
# Process parameters for the AMS C35 Process (5V option)
# Typical sheet resistance for RPOLYH resistor
R_PH := 1200 Ω
# Thermal coefficient for RPOLY2 resistor
α_HY := -0.75*10^-3
# Typical sheet resistance for RPOLY2 resistor
R_P2 := 50 Ω
# Thermal coefficient for RPOLY2 resistor
α_P2 := 0.59*10^-3
# Area capacitance for double poly capacitors fF/um^2
C_a_pp := 860*fF/μm^2
# Thermal coefficient for double poly caps
α_pp := 30*10^-6
# Threshold voltages
V_TN := 0.70 V
V_TP := -0.97 V
# Subthreshold slope factor
n := 1.5
# Supply voltage
V_DD := 5 V
# Transconductance parameter
K_PN := 100*μA/V^2
K_PP := 30*μA/V^2
Ρ := K_PN/K_PP = 3.33333
Permitivity
ε_o := 8.854*10^-14*F/cm
ε_SiO2 := 3.9*ε_o = 3.45306e-13 F/cm
ε_Si := 11.7*ε_o = 1.03592e-12 F/cm
t_ox := 15 nm
# Oxide capacitance per unit area
C_ox := ε_SiO2/t_ox = 2.30204 fF/μm^2
# Substrate doping levels
N_A := 173*10^15*cm^-3  # P-SUBSTRATE
N_D := 63*10^15*cm^-3  # NWELL
# Intrinsic concentration
n_i := 1.05*10^10*cm^-3
# Thermal voltage:
U_T := 25.9 mV
# Electronic charge:
q_e := 1.602*10^-19*C
# Flicker noise parameters (current noise)
K_aP := 3.8*10^-30*A*F
K_aN := 6.3*10^-26*A*F
# Flicker noise current density
i_n2 := K_a*I_B/(C_OX*L^2)*df/f  # error: This variable is undefined.
v_n2 := i_n2/g_m^2 → I_B*K_a*df/(C_OX*L^2*f*g_m^2)  # error: This variable is undefined.
# If the device is strongly inverted then we can write
v_n2 := v_n2 substitute, g_m == sqrt(2*I_B*S*K_P/n_sub) → K_a*df*n_sub/(2*C_OX*K_P*L^2*S*f)  # error: This variable is undefined.
v_n2 := v_n2 substitute, S == W/L → K_a*df*n_sub/(2*C_OX*K_P*L*W*f)  # error: This variable is undefined.
v_n2 := v_n2 substitute, K_a*n_sub/(2*K_P) == K_v → K_v*df/(C_OX*L*W*f)  # error: This variable is undefined.
# So let us compute
K_vP := K_aP*n/(2*K_PP) = 9.5e-26 J
K_vN := K_aN*n/(2*K_PN) = 4.725e-22 J
# IMPORTANT FUNCTIONS
# Functions to compute inversion coefficient.
θN(I, S) := I/(2*n*S*K_PN*U_T^2)
θP(I, S) := I/(2*n*S*K_PP*U_T^2)
# Equation used to compute saturation voltage.
VSAT(θ) := 2*n*U_T*sqrt(θ)/(1 - e^(-sqrt(θ)))
# Equation used to compute shape factor given θ and I.
SN(I, θ) := I/(2*n*θ*K_PN*U_T^2)
SP(I, θ) := I/(2*n*θ*K_PP*U_T^2)
# Compute output resistance
K_dsn := sqrt(2*ε_Si/(q_e*N_A)) = 0.0864616 μm/sqrt(V)
K_dsp := sqrt(2*ε_Si/(q_e*N_D)) = 0.143277 μm/sqrt(V)
# Assume
ϕ_o := 0.8 V
VEN(L) := 2*L*sqrt(ϕ_o)/K_dsn
VEP(L) := 2*L*sqrt(ϕ_o)/K_dsp
# Equations used to compute transconductance.
GM(I, θ) :=
    out ← (1 - e^(-sqrt(θ)))/sqrt(θ)*I/(n*U_T)
    return out
# Functions to compute gate capacitance
CGN(I, θ, L) :=
    out ← C_ox*I*L^2/(2*n*θ*K_PN*U_T^2)
    return out
CGP(I, θ, L) :=
    out ← C_ox*I*L^2/(2*n*θ*K_PP*U_T^2)
    return out
# Functions to compute gate-drain capacitance
CGDN(W) :=
    out ← W*0.1*fF/μm
    return out
CGDP(W) :=
    out ← W*0.1*fF/μm
    return out
# Functions used to compute the DB and SB capacitance
LDIFF := 1.2 μm
CXBN(W) :=
    out ← W*LDIFF*0.416*fF/μm^2 + 2*(W + LDIFF)*0.345*fF/μm
    return out
CXBP(W) :=
    out ← W*LDIFF*0.710*fF/μm^2 + 2*(W + LDIFF)*0.236*fF/μm
    return out
# Function used to compute the gate-source capacitance
CGS(W, L) :=
    out ← 2/3*W*L*C_ox
    return out
# Equations used to compute noise spectral density
# First the thermal density
SVT(I, θ) :=
    (γ ← 1/(1 + θ)*(1/2 + 2/3*θ))
    out ← 4*U_T*q_e*n*γ/GM(I, θ)
    return out
# Now the flicker noise densities.
SVFP(I, θ, L) :=
    α ← (1 - e^(-sqrt(θ)))/sqrt(θ)
    out ← n^2*U_T^2*K_aP/(α^2*I*C_ox*L^2)
    return out
SVFN(I, θ, L) :=
    α ← (1 - e^(-sqrt(θ)))/sqrt(θ)
    out ← n^2*U_T^2*K_aN/(α^2*I*C_ox*L^2)
    return out
S_N := 1
V_GS := 4.1 V
n := 1.6
I_DS := 1/(2*n)*K_PN*(V_GS - V_TN)^2 = 0.00036125 A
I_SD := 1/(2*n)*K_PP*(V_DD - |V_TP|)^2 = 0.000152258 A
