n := 0 .. 5
x[n] := 1
y[n] := n
AMP := 20 mV  # Amplitude of the pulse
τ_r := 3 ns  # Risetime constant of the pulse
τ_a := 100 μs  # Amplifier characteristic time constant
A_0 := 10^4  # Low-frequency gain of the amplifier
k := 0.67  # CFD fraction
N := 200  # Number of data points
δt := 100*ps  # Time step
i := 0 .. N - 1
t[i] := i*δt  # Time vector
# TIme domain description of Nowlin circuit output.
nowlin(t) := AMP*(1 - e^(-t/τ_r) - (t/τ_r)*e^(-t/τ_r)) - k*AMP*(1 - e^(-t/τ_r))
amplifier(t) := A_0*e^(-t/τ_a)  # Impulse response of the amplifier
x[i] := nowlin(t[i])  # error: This value has units: Potential, but must have units: Unitless.
h[i] := amplifier(t[i])
# Plot the input waveform. | Plot the impulse response.
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